# OpenSim document version 20302
ControlSet Control Set:
  defaults: ControlLinear default: is_model_control=true extrapolate=true default_min=0.02 default_max=1
      filter_on=false use_steps=true kp=100 kv=20
  ControlLinear [values shared by the 31 below unless stated]: is_model_control=true extrapolate=true default_min=0.01
      default_max=1 filter_on=false use_steps=true kp=100 kv=20
  ControlLinear TRAPS.excitation
  ControlLinear TRAPI.excitation
  ControlLinear TRAPC.excitation
  ControlLinear DELT1.excitation
  ControlLinear DELT2.excitation
  ControlLinear DELT3.excitation
  ControlLinear SUPSP.excitation
  ControlLinear INFSP.excitation
  ControlLinear SUBSC.excitation: default_min=0.02
  ControlLinear TMIN.excitation
  ControlLinear TMAJ.excitation
  ControlLinear PECM1.excitation
  ControlLinear PECM2.excitation
  ControlLinear PECM3.excitation
  ControlLinear CORB.excitation
  ControlLinear TRIlong.excitation
  ControlLinear TRIlat.excitation
  ControlLinear TRImed.excitation
  ControlLinear SUP.excitation
  ControlLinear BIClong.excitation: default_min=0.02
  ControlLinear BICshort.excitation
  ControlLinear BRA.excitation
  ControlLinear BRD.excitation
  ControlLinear ECRL.excitation
  ControlLinear ECRB.excitation
  ControlLinear ECU.excitation
  ControlLinear FCR.excitation
  ControlLinear FCU.excitation
  ControlLinear PL.excitation
  ControlLinear PT.excitation
  ControlLinear PQ.excitation
