# OpenSim document version 20302
CMC_TaskSet arm26:
  CMC_Joint shoulder_elev: weight=1 active=(true false false) kp=100 kv=20 ka=1 coordinate=shoulder_elev limit=0
  CMC_Joint elv_angle: weight=1 active=(true false false) kp=100 kv=20 ka=1 coordinate=elv_angle limit=0
  CMC_Joint shoulder_rot: weight=1 active=(true false false) kp=100 kv=20 ka=1 coordinate=shoulder_rot limit=0
  CMC_Joint elbow_flexion: weight=1 active=(true false false) kp=100 kv=20 ka=1 coordinate=elbow_flexion limit=0
