# OpenSim document version 40000
Model Henri:
  gravity: 0 -9.80665 0
  publications: Comp Meth Biomech Biomed Eng 2014
  length_units: meters
  force_units: N
  credits:
    Katherine R. Saul, Wendy M. Murray, Craig M. Goehler, Melissa Daly, Meghan E. Vidt, Dustin L. Crouch
  Ground
  BodySet:
    Body thorax: mass=38.19662 [kg] mass_center=(0 -0.16 0) inertia=(2.099177 1.07557 2.037817 0 0 0)
        meshes=(thorax.vtp ground_spine.vtp)
      WrapEllipsoid Thorax: xyz_body_rotation=(-0.0459 0.3196 0.010899) translation=(-0.075486 -0.1273 0.0709)
          quadrant=all dimensions=(0.04 0.135 0.04)
    Body clavicle: mass=0.2220899 mass_center=(-0.011096 0.0063723 0.054168)
        inertia=(0.000345364 0.0003634017 6.323868e-5 -2.702094e-5 -9.957031e-5 7.646442e-5) meshes=clavicle.vtp
    Body clavphant: mass=0.0001423653 mass_center=(0 0 0) inertia=(1.423653 1.423653 1.423653 0 0 0)
    Body scapula: mass=1.002195 mass_center=(-0.054694 -0.035032 -0.043734)
        inertia=(0.001769459 0.001637771 0.001943429 0.0006397898 0.0005825874 0.0003432428) meshes=scapula.vtp
      WrapEllipsoid trap: xyz_body_rotation=(1.54 -0.184881 -1.1423) translation=(-0.0706606 -0.0488 -0.092096)
          quadrant=all dimensions=(0.01833 0.03 0.0535)
      WrapEllipsoid Deltoid2: xyz_body_rotation=(3.13042 -1.54881 -1.31423) translation=(-0.0058 -0.0378 0.0096)
          quadrant=-y dimensions=(0.033 0.04 0.035)
      WrapTorus Delt3: xyz_body_rotation=(0.620988 0.32882 -0.560774) translation=(-0.0973 -0.0428 -0.037) quadrant=all
          inner_radius=0.04 outer_radius=0.06
      WrapTorus INFSP: xyz_body_rotation=(0.0253073 0.58835 0.151844) translation=(-0.0561 -0.0199 -0.0112)
          quadrant=all inner_radius=0.008 outer_radius=0.019
      WrapEllipsoid TMIN: xyz_body_rotation=(-2.09754 -0.280823 -1.76348) translation=(-0.0418 -0.0519 -0.0359)
          quadrant=x dimensions=(0.03 0.03 0.05)
      WrapCylinder TRIlongglen: xyz_body_rotation=(1.37532 -0.294612 2.43596) translation=(-0.0359 -0.0309 -0.0132)
          quadrant=x radius=0.003 length=0.03
    Body scapphant: mass=0.0001423653 mass_center=(0 0 0) inertia=(1.423653 1.423653 1.423653 0 0 0)
    Body humphant: mass=0.0001423653 mass_center=(0 0 0) inertia=(1.423653 1.423653 1.423653 0 0 0)
    Body humphant1: mass=0.0001423653 mass_center=(0 0 0) inertia=(1.423653 1.423653 1.423653 0 0 0)
    Body humerus: mass=2.843847 mass_center=(0.02046651 -0.1587798 -0.01444122)
        inertia=(0.02243766 0.004662627 0.02298829 -0.0006349015 -0.0004249003 0.00224658) meshes=humerus.vtp
      WrapEllipsoid DELT1hh: xyz_body_rotation=(-0.584685 1.50046 0.570374) translation=(-0.0039 -0.0127 -0.00262)
          quadrant=all dimensions=(0.05 0.05 0.04)
      WrapCylinder delt2hum: xyz_body_rotation=(1.55093 -0.0199582 0.0596618)
          translation=(0.0019261 -0.1085414 0.0012463) quadrant=all radius=0.0123497 length=0.13596
      WrapEllipsoid delt3hum: xyz_body_rotation=(1.72735 0.0759218 -2.74313)
          translation=(0.0021527 -0.0670736 0.0012463) quadrant=x dimensions=(0.01133 0.01133 0.05665)
      WrapEllipsoid SUPSP: xyz_body_rotation=(0.0380482 0.00855211 -1.30673)
          translation=(0.0002266 0.0087241 0.0048719) quadrant=all dimensions=(0.02266 0.02266 0.02266)
      WrapEllipsoid INFSP_and_TMIN_hum_head: xyz_body_rotation=(-0.286583 -0.00907571 -0.0684169)
          translation=(-0.0003399 0.0029458 0.0043054) quadrant=all dimensions=(0.02266 0.028325 0.02266)
      WrapEllipsoid SUBSCAP: xyz_body_rotation=(-0.924501 0.288852 0.381529)
          translation=(-0.0028325 0.0007931 -0.0050985) quadrant=all dimensions=(0.02266 0.019261 0.031724)
      WrapCylinder TMINhum: xyz_body_rotation=(1.75353 0.0692896 2.74628) translation=(-0.0015862 -0.0515515 0)
          quadrant=x radius=0.007931 length=0.07931
      WrapCylinder TMAJ_LAThum: xyz_body_rotation=(1.53641 -0.0637045 1.41424)
          translation=(0.0007931 -0.0501919 -0.0062315) quadrant=-x radius=0.007931 length=0.04532
      WrapCylinder PEC12hum: xyz_body_rotation=(1.55928 -0.0774926 -0.925897)
          translation=(0.002266 -0.0575564 -0.0019261) quadrant=x radius=0.010197 length=0.07931
      WrapSphere PEC23hh: translation=(-0.0097438 0.0023793 -0.0004532) quadrant=all radius=0.02266
      WrapEllipsoid PEC1hh: xyz_body_rotation=(-0.620465 -0.310494 0.363727)
          translation=(-0.0041921 0.0005665 -0.0028325) quadrant=-z dimensions=(0.03399 0.02266 0.02266)
      WrapCylinder PEC3hum: xyz_body_rotation=(1.44094 -0.0561996 1.75196)
          translation=(0.0010197 -0.0624283 -0.0004532) quadrant=-x radius=0.009064 length=0.1133
      WrapCylinder LAT_TMAJhh: xyz_body_rotation=(-0.305084 -0.018326 -0.686613)
          translation=(-0.0253792 0.0115566 0.0106502) quadrant=-y radius=0.007931 length=0.050985
      WrapSphere LAT_TMAJ2hh: xyz_body_rotation=(-0.127235 0.276111 0.0197222)
          translation=(-0.0018128 0.0104236 0.0058916) quadrant=-z radius=0.03399
      WrapEllipsoid Elbow_BIC_BRD: xyz_body_rotation=(-0.128631 0.137532 0.0307178)
          translation=(0.0021527 -0.327437 -0.015862) quadrant=x dimensions=(0.016995 0.016995 0.1133)
      WrapSphere TRIlonghh: xyz_body_rotation=(0.2 -3.06 -2.015) translation=(-0.008 0 0.002) quadrant=all radius=0.029
      WrapCylinder TRI: xyz_body_rotation=(-0.14015 -0.00628319 0.154985) translation=(0.0031724 -0.3307227 -0.0134827)
          quadrant=all radius=0.018128 length=0.1133
      WrapSphere BIClong: xyz_body_rotation=(0 0.5 1) translation=(0.00263989 0.0026059 0.003399) quadrant=x
          radius=0.028325
      WrapSphere TMAJ_LAT_PEC_CORBhh: translation=(0.0007931 0 0.006798) quadrant=all radius=0.03399
      WrapSphere DELT_TMAJ_LAT_PEC_CORBhh: translation=(0.0007931 0 0.006798) quadrant=all radius=0.03399
      WrapCylinder CORBhum: xyz_body_rotation=(-1.60832 0.0959931 0.875283)
          translation=(0.0030591 -0.1361866 -0.0066847) quadrant=x radius=0.009064 length=0.1133
      WrapEllipsoid Elbow_PT_ECRL: xyz_body_rotation=(-0.161094 -0.110828 0.61453)
          translation=(0.003399 -0.3253976 -0.0078177) quadrant=x dimensions=(0.020394 0.028325 0.039655)
    Body ulna: mass=1.573564 mass_center=(0.01088397 -0.107465 0.02720032)
        inertia=(0.009666862 0.002059384 0.00882845 0.0005658583 -0.000135991 0.001949573) meshes=ulna.vtp
      WrapCylinder PQ2: xyz_body_rotation=(1.39138 0.0689405 1.52245) translation=(-0.001344 -0.234304 0.047936)
          quadrant=all radius=0.00784 length=0.112
    Body radius: mass=0.3325512 mass_center=(0.03767019 -0.2033461 0.017472)
        inertia=(0.000783176 0.0001582067 0.0007189397 5.382494e-5 -7.571922e-6 0.0001146146) meshes=radius.vtp
      WrapCylinder SUP: xyz_body_rotation=(1.44775 0.304036 -2.44102) translation=(0.00504 -0.048944 0.006608)
          quadrant=-x radius=0.00896 length=0.0448
      WrapTorus ECU: xyz_body_rotation=(-0.986635 -0.148877 0.222704) translation=(-0.018256 -0.270704 0.039088)
          quadrant=all inner_radius=0.00672 outer_radius=0.01008
      WrapCylinder PQ1: xyz_body_rotation=(-1.60762 -0.0127409 -2.69025) translation=(0.031472 -0.222432 0.032256)
          quadrant=all radius=0.0112 length=0.112
    Body proximal_row: mass=0.0001423653 mass_center=(0 0 0) inertia=(1.423653e-5 1.423653e-5 1.423653e-5 0 0 0)
        meshes=(lunate.vtp sdfastSCAPHOIDw.vtp sdfastPISIFORMw.vtp sdfastTRIQUETRALw.vtp)
      WrapEllipsoid Extensor_ellipse: xyz_body_rotation=(-0.250804 0.285536 0.232827)
          translation=(0.0007 -0.0135 0.0047) quadrant=z dimensions=(0.05 0.02 0.013)
      WrapTorus ECRL: xyz_body_rotation=(1.53833 0.234398 0.731118) translation=(0.0222 -0.0096 0.0208) quadrant=all
          inner_radius=0.008 outer_radius=0.016
      WrapTorus ECRB: xyz_body_rotation=(1.31266 -0.11781 -0.116239) translation=(0.0126 -0.0095 0.0186) quadrant=all
          inner_radius=0.008 outer_radius=0.01
      WrapTorus FCR: xyz_body_rotation=(-1.55596 -0.15324 -0.100007) translation=(0.0032 -0.0045 -0.019) quadrant=all
          inner_radius=0.001 outer_radius=0.0025
      WrapTorus FCU: xyz_body_rotation=(-1.57376 -0.0797616 0.39235) translation=(-0.0123 -0.0124 -0.0171) quadrant=all
          inner_radius=0.0068 outer_radius=0.008
      WrapEllipsoid PL: xyz_body_rotation=(-0.0315905 0.0996583 0.0633554) translation=(0.0057 -0.018 -0.0041)
          quadrant=-z dimensions=(0.025 0.014 0.012)
      WrapEllipsoid FDS: xyz_body_rotation=(0.00837758 -0.0816814 -0.0171042) translation=(0.0012 -0.0057 -0.0003)
          quadrant=-z dimensions=(0.025 0.013 0.012)
      WrapEllipsoid FDP: xyz_body_rotation=(-1.46747 -0.194604 0.121824) translation=(-0.0022 -0.0069 0.0032)
          quadrant=y dimensions=(0.025 0.013 0.012)
      WrapTorus EDCL: xyz_body_rotation=(2.36318 0.193033 -0.26913) translation=(-0.0128 -0.0133 0.0148) quadrant=all
          inner_radius=0.008 outer_radius=0.012
      WrapTorus EDCR: xyz_body_rotation=(1.98392 0.100531 0.523075) translation=(-0.0098 -0.0137 0.0166) quadrant=all
          inner_radius=0.0105 outer_radius=0.011
      WrapTorus EDCM: xyz_body_rotation=(1.99317 0.19792 0.368264) translation=(-0.0007 -0.0117 0.0191) quadrant=all
          inner_radius=0.009 outer_radius=0.012
      WrapTorus EDCI: xyz_body_rotation=(1.69768 0.0897099 0.00767945) translation=(0.009 -0.0149 0.0211) quadrant=all
          inner_radius=0.009 outer_radius=0.012
      WrapEllipsoid EDM: xyz_body_rotation=(2.9627 0.159349 0.117984) translation=(-0.0167 -0.0022 0.0048) quadrant=-z
          dimensions=(0.018 0.014 0.008)
      WrapEllipsoid FPL: xyz_body_rotation=(-0.16633 -0.082205 -0.0659735) translation=(0.017 -0.025 -0.0033)
          quadrant=-z dimensions=(0.016 0.01 0.01)
    Body hand: mass=0.8284238 mass_center=(-0.00301314 -0.0424993 -0.00112205)
        inertia=(0.0001566019 8.54192e-5 0.000213548 1.281288e-6 -2.847307e-7 1.708384e-5)
        meshes=(sdfast_1seg_hand_fr_c_5mc.vtp sdfast_1seg_hand_fr_c_4mc.vtp sdfast_1seg_hand_fr_c_3mc.vtp sdfast_1seg_hand_fr_c_2mc.vtp sdfast_1seg_hand_fr_c_trapezium.vtp sdfast_1seg_hand_fr_c_trapezoid.vtp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)
      WrapCylinder _2rdmcp_FDS: xyz_body_rotation=(0.593936 1.50011 -2.16578) translation=(0.0182 -0.0659 0.0087)
          quadrant=y radius=0.013 length=0.01
      WrapCylinder _2rdmcp_FDP: xyz_body_rotation=(0.593936 1.50011 -2.23559) translation=(0.0182 -0.0659 0.0087)
          quadrant=y radius=0.0105 length=0.01
      WrapCylinder _2rdmcp_ext: xyz_body_rotation=(0.593936 1.50011 -1.99125) translation=(0.0182 -0.0659 0.0087)
          quadrant=-y radius=0.01 length=0.01
      WrapEllipsoid _2ndmcp: active=false xyz_body_rotation=(1.48667 -1.29661 2.43072)
          translation=(0.0206 -0.068 0.0044) quadrant=-x dimensions=(0.005 0.005 0.03)
      WrapCylinder _3rdmcp_FDS: xyz_body_rotation=(0.770388 1.32837 1.5708) translation=(0.0007 -0.0655 0.0092)
          quadrant=-x radius=0.013 length=0.01
      WrapCylinder _3rdmcp_FDP: xyz_body_rotation=(0.770388 1.32837 1.5708) translation=(0.0046 -0.0662 0.0099)
          quadrant=-x radius=0.0105 length=0.01
      WrapCylinder _3rdmcp_ext: xyz_body_rotation=(0.770388 1.32837 1.46608) translation=(0.0007 -0.0655 0.0092)
          quadrant=y radius=0.01 length=0.01
      WrapCylinder _4rdmcp_FDS: xyz_body_rotation=(0.858527 1.10165 -2.48535) translation=(-0.0139 -0.0642 0.0033)
          quadrant=y radius=0.013 length=0.01
      WrapCylinder _4rdmcp_FDP: xyz_body_rotation=(0.858527 1.10165 -2.48535) translation=(-0.0139 -0.0642 0.0033)
          quadrant=y radius=0.0105 length=0.01
      WrapCylinder _4rdmcp_ext: xyz_body_rotation=(0.858527 1.10165 -3.09621) translation=(-0.0139 -0.0642 0.0033)
          quadrant=x radius=0.01 length=0.01
      WrapCylinder _5rdmcp_FDS: xyz_body_rotation=(0.470541 0.975639 -2.12162) translation=(-0.0235 -0.0561 -0.0057)
          quadrant=y radius=0.013 length=0.012
      WrapCylinder _5rdmcp_FDP: xyz_body_rotation=(0.470541 0.975639 -2.34852) translation=(-0.0235 -0.0561 -0.0057)
          quadrant=y radius=0.0105 length=0.01
      WrapCylinder _5rdmcp_ext: xyz_body_rotation=(0.470541 0.975639 -1.68529) translation=(-0.0235 -0.0561 -0.0057)
          quadrant=-y radius=0.01 length=0.012
      WrapCylinder Secondpm_FDS: xyz_body_rotation=(-1.57813 1.24808 1.0259) translation=(0.0307 -0.0924 -0.0222)
          quadrant=y radius=0.0075 length=0.01
      WrapCylinder Secondpm_FDP: xyz_body_rotation=(-1.57813 1.24808 1.0259) translation=(0.0307 -0.0924 -0.0222)
          quadrant=y radius=0.008 length=0.01
      WrapCylinder Secondpm_ext: xyz_body_rotation=(-1.57813 1.24808 1.0259) translation=(0.0307 -0.0924 -0.0222)
          quadrant=-y radius=0.0055 length=0.012
      WrapCylinder Secondmd_flex: xyz_body_rotation=(-1.63171 1.34286 2.11639) translation=(0.0291 -0.0821 -0.045)
          quadrant=y radius=0.005 length=0.01
      WrapCylinder Secondmd_ext: xyz_body_rotation=(-1.63171 1.34286 2.11639) translation=(0.0291 -0.0821 -0.045)
          quadrant=-y radius=0.002 length=0.01
      WrapCylinder Secondpm: active=false xyz_body_rotation=(2.2513 -1.37008 1.18159)
          translation=(0.0306 -0.0911 -0.0223) quadrant=all radius=0.004 length=0.01
      WrapCylinder Secondmd: active=false xyz_body_rotation=(1.35525 -1.38387 -0.557109)
          translation=(0.0295 -0.0815 -0.0441) quadrant=x radius=0.003 length=0.01
      WrapCylinder MPthumb: xyz_body_rotation=(0.321315 0.11013 -0.834791) translation=(0.0402 -0.0405 -0.0271)
          quadrant=all radius=0.0085 length=0.02
      WrapCylinder IPthumb: xyz_body_rotation=(0.332136 -0.026529 -0.257611) translation=(0.0396 -0.0713 -0.0365)
          quadrant=-x radius=0.0045 length=0.01
      WrapCylinder Thirdpm_FDS: xyz_body_rotation=(-0.407883 1.45246 -0.145386) translation=(0.0122 -0.0934 -0.0238)
          quadrant=y radius=0.0075 length=0.01
      WrapCylinder Thirdpm_FDP: xyz_body_rotation=(-0.407883 1.45246 -0.145386) translation=(0.0122 -0.0934 -0.0238)
          quadrant=y radius=0.008 length=0.01
      WrapCylinder Thirdpm_ext: xyz_body_rotation=(-0.407883 1.45246 -0.145386) translation=(0.0122 -0.0934 -0.0238)
          quadrant=-y radius=0.0055 length=0.01
      WrapCylinder Thirdmd_flex: xyz_body_rotation=(0.714189 1.28282 -0.203331) translation=(0.019 -0.0814 -0.0494)
          quadrant=y radius=0.005 length=0.01
      WrapCylinder Thirdmd_ext: xyz_body_rotation=(0.714189 1.28282 -0.203331) translation=(0.019 -0.0814 -0.0494)
          quadrant=-y radius=0.002 length=0.01
      WrapCylinder Fourthpm_FDS: xyz_body_rotation=(0.696212 0.976861 -1.21876) translation=(-0.005 -0.0871 -0.0289)
          quadrant=y radius=0.0075 length=0.01
      WrapCylinder Fourthpm_FDP: xyz_body_rotation=(0.696212 0.976861 -1.21876) translation=(-0.005 -0.0871 -0.0289)
          quadrant=y radius=0.008 length=0.01
      WrapCylinder Fourthpm_ext: xyz_body_rotation=(0.696212 0.976861 -1.21876) translation=(-0.005 -0.0871 -0.0289)
          quadrant=-y radius=0.0055 length=0.01
      WrapCylinder Fourthmd_flex: xyz_body_rotation=(0.75311 0.925897 -0.167377) translation=(0.0094 -0.0778 -0.0469)
          quadrant=y radius=0.005 length=0.01
      WrapCylinder Fourthmd_ext: xyz_body_rotation=(0.75311 0.925897 -0.167377) translation=(0.0094 -0.0778 -0.0469)
          quadrant=-y radius=0.002 length=0.01
      WrapCylinder Fifthpm_FDS: xyz_body_rotation=(0.977035 0.825192 -1.51687) translation=(-0.0154 -0.0784 -0.0329)
          quadrant=y radius=0.0075 length=0.01
      WrapCylinder Fifthpm_FDP: xyz_body_rotation=(0.977035 0.825192 -1.79612) translation=(-0.0153 -0.0786 -0.0329)
          quadrant=y radius=0.008 length=0.01
      WrapCylinder Fifthpm_ext: xyz_body_rotation=(0.977035 0.825192 -1.08053) translation=(-0.0152 -0.0785 -0.0328)
          quadrant=-y radius=0.0055 length=0.01
      WrapCylinder Fifthmd_flex: xyz_body_rotation=(0.979304 0.65031 -0.620814) translation=(0.0007 -0.0741 -0.0457)
          quadrant=y radius=0.005 length=0.01
      WrapCylinder Fifthmd_ext: xyz_body_rotation=(0.979304 0.65031 -0.620814) translation=(0.007 -0.0741 -0.0457)
          quadrant=-y radius=0.002 length=0.01
  JointSet:
    WeldJoint ground_thorax: socket_parent_frame=ground_offset socket_child_frame=thorax_offset
      PhysicalOffsetFrame ground_offset: socket_parent=/ground translation=(0 1 0) [meters]
      PhysicalOffsetFrame thorax_offset: socket_parent=/bodyset/thorax translation=(0 0 0)
    CustomJoint sternoclavicular: socket_parent_frame=thorax_offset socket_child_frame=clavicle_offset
      Coordinate sternoclavicular_r2: default_value=8.374851e-18 range=(-99999.9 99999.9) clamped=false
      Coordinate sternoclavicular_r3: default_value=-3.547192e-18 range=(-99999.9 99999.9) clamped=false
      PhysicalOffsetFrame thorax_offset: socket_parent=/bodyset/thorax translation=(0.006325 0.00693 0.025465)
      PhysicalOffsetFrame clavicle_offset: socket_parent=/bodyset/clavicle translation=(0 0 0)
      SpatialTransform: axes_held_at_zero=(rotation3 translation1 translation2 translation3)
        TransformAxis rotation1: coordinates=sternoclavicular_r2 axis=(0.0153 0.9892987 -0.1451)
            LinearFunction(coefficients=1 0)
        TransformAxis rotation2: coordinates=sternoclavicular_r3 axis=(-0.9944725 0 -0.104997)
            LinearFunction(coefficients=1 0)
    CustomJoint unrotscap: socket_parent_frame=clavicle_offset socket_child_frame=clavphant_offset
      Coordinate unrotscap_r3: default_value=3.547192e-18 range=(-99999.9 99999.9) clamped=false
      Coordinate unrotscap_r2: default_value=-8.374851e-18 range=(-99999.9 99999.9) clamped=false
      PhysicalOffsetFrame clavicle_offset: socket_parent=/bodyset/clavicle translation=(-0.01433 0.02007 0.135535)
      PhysicalOffsetFrame clavphant_offset: socket_parent=/bodyset/clavphant translation=(0 0 0)
      SpatialTransform: axes_held_at_zero=(rotation3 translation1 translation2 translation3)
        TransformAxis rotation1: coordinates=unrotscap_r3 axis=(-0.9944725 0 -0.104997)
            LinearFunction(coefficients=1 0)
        TransformAxis rotation2: coordinates=unrotscap_r2 axis=(0.0153 0.9892987 -0.1451)
            LinearFunction(coefficients=1 0)
    CustomJoint acromioclavicular: socket_parent_frame=clavphant_offset socket_child_frame=scapula_offset
      Coordinate acromioclavicular_r2: default_value=1.695737e-18 range=(-99999.9 99999.9) clamped=false
      Coordinate acromioclavicular_r3: default_value=-1.370435e-17 range=(-99999.9 99999.9) clamped=false
      Coordinate acromioclavicular_r1: default_value=-6.160011e-18 range=(-99999.9 99999.9) clamped=false
      PhysicalOffsetFrame clavphant_offset: socket_parent=/bodyset/clavphant translation=(0 0 0)
      PhysicalOffsetFrame scapula_offset: socket_parent=/bodyset/scapula translation=(0 0 0)
      SpatialTransform: axes_held_at_zero=(translation1 translation2 translation3)
        TransformAxis rotation1: coordinates=acromioclavicular_r2 axis=(0.1570949 0.9472686 -0.2792909)
            LinearFunction(coefficients=1 0)
        TransformAxis rotation2: coordinates=acromioclavicular_r3 axis=(-0.754084 0.297594 0.585487)
            LinearFunction(coefficients=1 0)
        TransformAxis rotation3: coordinates=acromioclavicular_r1 axis=(0.6376998 0.1186 0.7610998)
            LinearFunction(coefficients=1 0)
    CustomJoint unrothum: socket_parent_frame=scapula_offset socket_child_frame=scapphant_offset
      Coordinate unrothum_r1: default_value=6.160011e-18 range=(-99999.9 99999.9) clamped=false
      Coordinate unrothum_r3: default_value=1.370435e-17 range=(-99999.9 99999.9) clamped=false
      Coordinate unrothum_r2: default_value=-1.695737e-18 range=(-99999.9 99999.9) clamped=false
      PhysicalOffsetFrame scapula_offset: socket_parent=/bodyset/scapula translation=(-0.00955 -0.034 0.009)
      PhysicalOffsetFrame scapphant_offset: socket_parent=/bodyset/scapphant translation=(0 0 0)
      SpatialTransform: axes_held_at_zero=(translation1 translation2 translation3)
        TransformAxis rotation1: coordinates=unrothum_r1 axis=(0.6376998 0.1186 0.7610998)
            LinearFunction(coefficients=1 0)
        TransformAxis rotation2: coordinates=unrothum_r3 axis=(-0.754084 0.297594 0.585487)
            LinearFunction(coefficients=1 0)
        TransformAxis rotation3: coordinates=unrothum_r2 axis=(0.1570949 0.9472686 -0.2792909)
            LinearFunction(coefficients=1 0)
    CustomJoint shoulder0: socket_parent_frame=scapphant_offset socket_child_frame=humphant_offset
      Coordinate elv_angle: default_value=1.22 range=(-1.570796 2.268928) clamped=true
      PhysicalOffsetFrame scapphant_offset: socket_parent=/bodyset/scapphant translation=(0 0 0)
      PhysicalOffsetFrame humphant_offset: socket_parent=/bodyset/humphant translation=(0 0 0)
      SpatialTransform: axes_held_at_zero=(rotation2 rotation3 translation1 translation2 translation3)
        TransformAxis rotation1: coordinates=elv_angle axis=(0.0048 0.9990892 0.04240001)
            LinearFunction(coefficients=1 0)
    CustomJoint shoulder1: socket_parent_frame=humphant_offset socket_child_frame=humphant1_offset
      Coordinate shoulder_elev: default_value=0.14 range=(0 3.141593) clamped=true
      Coordinate shoulder1_r2: default_value=-1.570796 range=(-99999.9 99999.9) clamped=false
      PhysicalOffsetFrame humphant_offset: socket_parent=/bodyset/humphant translation=(0 0 0)
      PhysicalOffsetFrame humphant1_offset: socket_parent=/bodyset/humphant1 translation=(0 0 0)
      SpatialTransform: axes_held_at_zero=(rotation3 translation1 translation2 translation3)
        TransformAxis rotation1: coordinates=shoulder_elev axis=(-0.9982614 0.0023 0.05889802)
            LinearFunction(coefficients=1 0)
        TransformAxis rotation2: coordinates=shoulder1_r2 axis=(0.0048 0.9990892 0.04240001)
            LinearFunction(coefficients=1 0)
    CustomJoint shoulder2: socket_parent_frame=humphant1_offset socket_child_frame=humerus_offset
      Coordinate shoulder_rot: default_value=0.16 range=(-1.570796 0.3490659) clamped=true
      PhysicalOffsetFrame humphant1_offset: socket_parent=/bodyset/humphant1 translation=(0 0 0)
      PhysicalOffsetFrame humerus_offset: socket_parent=/bodyset/humerus translation=(0 0 0)
      SpatialTransform: axes_held_at_zero=(rotation2 rotation3 translation1 translation2 translation3)
        TransformAxis rotation1: coordinates=shoulder_rot axis=(0.0048 0.9990892 0.04240001)
            LinearFunction(coefficients=1 0)
    CustomJoint elbow: socket_parent_frame=humerus_offset socket_child_frame=ulna_offset
      Coordinate elbow_flexion: default_value=0.29 range=(0 2.268928) clamped=true
      PhysicalOffsetFrame humerus_offset: socket_parent=/bodyset/humerus translation=(0.0069113 -0.3290232 -0.0139359)
      PhysicalOffsetFrame ulna_offset: socket_parent=/bodyset/ulna translation=(0 0 0)
      SpatialTransform: axes_held_at_zero=(rotation2 rotation3 translation1 translation2 translation3)
        TransformAxis rotation1: coordinates=elbow_flexion axis=(0.04940001 0.03660001 0.9981083)
            LinearFunction(coefficients=1 0)
    CustomJoint radioulnar: socket_parent_frame=ulna_offset socket_child_frame=radius_offset
      Coordinate pro_sup: default_value=1.570796 range=(-1.570796 1.570796) clamped=true locked=true
      PhysicalOffsetFrame ulna_offset: socket_parent=/bodyset/ulna translation=(0.000448 -0.01288336 0.02239888)
      PhysicalOffsetFrame radius_offset: socket_parent=/bodyset/radius translation=(0 0 0)
      SpatialTransform: axes_held_at_zero=(rotation2 rotation3 translation1 translation2 translation3)
        TransformAxis rotation1: coordinates=pro_sup axis=(-0.01716099 0.9926656 -0.119668)
            LinearFunction(coefficients=1 0)
    CustomJoint radiocarpal: socket_parent_frame=radius_offset socket_child_frame=proximal_offset
      Coordinate deviation: default_value=-1.584253e-12 clamped=true locked=true
      Coordinate flexion: default_value=-6.301148e-12 clamped=true locked=true
      PhysicalOffsetFrame radius_offset: socket_parent=/bodyset/radius translation=(0.02016 -0.27104 0.028)
      PhysicalOffsetFrame proximal_offset: socket_parent=/bodyset/proximal_row translation=(0 0 0)
      SpatialTransform: axes_held_at_zero=(rotation2 translation1 translation2 translation3)
        TransformAxis rotation1: coordinates=deviation axis=(-0.819064 -0.135611 -0.557444)
          SimmSpline: x=(-0.174533 0 0.436332) y=(-0.174533 0 0.436332)
        TransformAxis rotation3: coordinates=flexion axis=(0.9564267 -0.2522069 0.147104)
          SimmSpline: x=(-1.5708 1.5708) y=(-0.785398 0.785398)
    CustomJoint wrist_hand: socket_parent_frame=proximal_offset socket_child_frame=hand_offset
      Coordinate wrist_hand_r1: default_value=0 clamped=true locked=true
      Coordinate wrist_hand_r3: default_value=0 clamped=true locked=true
      PhysicalOffsetFrame proximal_offset: socket_parent=/bodyset/proximal_row
          translation=(0.003992 -0.015054 0.002327)
      PhysicalOffsetFrame hand_offset: socket_parent=/bodyset/hand translation=(0 0 0)
      SpatialTransform: axes_held_at_zero=(rotation3 translation1 translation2 translation3)
        TransformAxis rotation1: coordinates=wrist_hand_r1 axis=(0.8991357 -0.3490529 -0.2640399)
            LinearFunction(coefficients=1 0)
        TransformAxis rotation2: coordinates=wrist_hand_r3 axis=(0.9971185 0.01069999 -0.07510096)
            LinearFunction(coefficients=1 0)
  ConstraintSet:
    CoordinateCouplerConstraint [values shared by the 11 below unless stated]: independent_coordinate_names=shoulder_elev
        scale_factor=1
    CoordinateCouplerConstraint sternoclavicular_r2_con: dependent_coordinate_name=sternoclavicular_r2
      coupled_coordinates_function: SimmSpline: x=(0 2.61799) y=(0 -0.633555)
    CoordinateCouplerConstraint sternoclavicular_r3_con: dependent_coordinate_name=sternoclavicular_r3
      coupled_coordinates_function: SimmSpline: x=(0 3.14159) y=(0 0.322013)
    CoordinateCouplerConstraint unrotscap_r2_con: dependent_coordinate_name=unrotscap_r2
      coupled_coordinates_function: SimmSpline: x=(0 2.61799) y=(0 0.633555)
    CoordinateCouplerConstraint unrotscap_r3_con: dependent_coordinate_name=unrotscap_r3
      coupled_coordinates_function: SimmSpline: x=(0 3.14159) y=(0 -0.322013)
    CoordinateCouplerConstraint acromioclavicular_r1_con: dependent_coordinate_name=acromioclavicular_r1
      coupled_coordinates_function: SimmSpline: x=(0 2.61799) y=(0 0.466003)
    CoordinateCouplerConstraint acromioclavicular_r2_con: dependent_coordinate_name=acromioclavicular_r2
      coupled_coordinates_function: SimmSpline: x=(0 2.61799) y=(0 -0.128282)
    CoordinateCouplerConstraint acromioclavicular_r3_con: dependent_coordinate_name=acromioclavicular_r3
      coupled_coordinates_function: SimmSpline: x=(0 2.61799) y=(0 1.03673)
    CoordinateCouplerConstraint unrothum_r1_con: dependent_coordinate_name=unrothum_r1
      coupled_coordinates_function: SimmSpline: x=(0 2.61799) y=(0 -0.466003)
    CoordinateCouplerConstraint unrothum_r2_con: dependent_coordinate_name=unrothum_r2
      coupled_coordinates_function: SimmSpline: x=(0 2.61799) y=(0 0.128282)
    CoordinateCouplerConstraint unrothum_r3_con: dependent_coordinate_name=unrothum_r3
      coupled_coordinates_function: SimmSpline: x=(0 2.61799) y=(0 -1.03673)
    CoordinateCouplerConstraint shoulder1_r2_con: independent_coordinate_names=elv_angle
        dependent_coordinate_name=shoulder1_r2
      coupled_coordinates_function: SimmSpline: x=(-1.5708 3.14159) y=(1.5708 -3.14159)
  ForceSet:
    CoordinateLimitForce shoulder_elv_ligaments: coordinate=shoulder_elev upper_stiffness=100 [N*m/degree]
        upper_limit=150 [degrees] lower_stiffness=100 [N*m/degree] lower_limit=30 [degrees] damping=0
        transition=542.8423 [degrees]
    CoordinateLimitForce shoulder_elv_damping: coordinate=shoulder_elev upper_stiffness=1e-8 upper_limit=190
        lower_stiffness=1e-8 lower_limit=190 damping=0.001745 transition=1
    CoordinateLimitForce elv_angle_ligaments: coordinate=elv_angle upper_stiffness=100 upper_limit=100
        lower_stiffness=100 lower_limit=-60 damping=0 transition=545.4471
    CoordinateLimitForce elv_angle_damping: coordinate=elv_angle upper_stiffness=1e-8 upper_limit=190
        lower_stiffness=1e-8 lower_limit=190 damping=0.001745 transition=1
    CoordinateLimitForce shoulder_rot_ligaments: coordinate=shoulder_rot upper_stiffness=100 upper_limit=-10
        lower_stiffness=100 lower_limit=-60 damping=0 transition=485.466
    CoordinateLimitForce shoulder_rot_damping: coordinate=shoulder_rot upper_stiffness=1e-8 upper_limit=190
        lower_stiffness=1e-8 lower_limit=190 damping=0.001745 transition=1
    CoordinateLimitForce elbow_flexion_ligaments: coordinate=elbow_flexion upper_stiffness=0.3037 upper_limit=85
        lower_stiffness=100 lower_limit=14 damping=0 transition=139.5813
    CoordinateLimitForce elbow_flexion_damping: coordinate=elbow_flexion upper_stiffness=1e-8 upper_limit=190
        lower_stiffness=1e-8 lower_limit=190 damping=0.001745 transition=1
    CoordinateLimitForce pro_sup_ligaments: coordinate=pro_sup upper_stiffness=50 upper_limit=60 lower_stiffness=50
        lower_limit=-60 damping=0 transition=430.1186
    CoordinateLimitForce pro_sup_damping: coordinate=pro_sup upper_stiffness=1e-8 upper_limit=190 lower_stiffness=1e-8
        lower_limit=190 damping=0.001745 transition=1
    Millard2012EquilibriumMuscle [values shared by the 37 below unless stated]: max_contraction_velocity=10
        ignore_tendon_compliance=true fiber_damping=0.001 minimum_activation=0.01
      ActiveForceLengthCurve: minimum_value=0
      ForceVelocityCurve: concentric_slope_at_vmax=0 concentric_slope_near_vmax=0.25 isometric_slope=5
          eccentric_slope_at_vmax=0 eccentric_slope_near_vmax=0.15 max_eccentric_velocity_force_multiplier=1.4
      FiberForceLengthCurve
      TendonForceLengthCurve
    Millard2012EquilibriumMuscle TRAPS: optimal_force=1 max_isometric_force=1043 optimal_fiber_length=0.1127
        tendon_slack_length=0.027 pennation_angle_at_optimal=0 [radians]
      PathPoint TrapeziusScapula2-P1: thorax (-0.07484987 0.04504423 -0.003626318)
      PathPoint TrapeziusScapula2-P2: scapula (-0.05174972 0.006890282 -0.02444138)
    Millard2012EquilibriumMuscle TRAPM: appliesForce=false optimal_force=1 max_isometric_force=470.4
        optimal_fiber_length=0.0832 tendon_slack_length=0.032 pennation_angle_at_optimal=0
      PathPoint TrapeziusScapula5-P1: thorax (-0.08448942 -0.000370542 -0.001766596)
      PathPoint TrapeziusScapula5-P2: scapula (-0.05824646 -0.001956695 -0.03631955)
      PathWrap: wrap_object=Thorax method=hybrid
    Millard2012EquilibriumMuscle TRAPI: optimal_force=1 max_isometric_force=414.4 optimal_fiber_length=0.1264
        tendon_slack_length=0.035 pennation_angle_at_optimal=0
      PathPoint TrapeziusScapula10-P1: thorax (-0.102 -0.1345713 0.001149972)
      PathPoint TrapeziusScapula10-P2: scapula (-0.076 -0.009 -0.07386386)
      PathWrap pathwrap_0: wrap_object=trap method=hybrid
    Millard2012EquilibriumMuscle TRAPC: optimal_force=1 max_isometric_force=201.6 optimal_fiber_length=0.1127
        tendon_slack_length=0.027 pennation_angle_at_optimal=0
      PathPoint TrapeziusClavicle1-P1: thorax (-0.06226524 0.1203095 0.002445757)
      PathPoint TrapeziusClavicle1-P2: clavicle (-0.03010645 0.02490017 0.09097307)
    Millard2012EquilibriumMuscle RHS: appliesForce=false optimal_force=1 max_isometric_force=200.2
        optimal_fiber_length=0.0986 tendon_slack_length=0.015 pennation_angle_at_optimal=0
        activation_time_constant=0.01 [seconds] deactivation_time_constant=0.04 [seconds]
      PathPoint Rhomboideus1-P1: thorax (-0.07329973 0.04018027 -0.002039944)
      PathPoint Rhomboideus1-P2: scapula (-0.08266947 -0.02291091 -0.1017337)
      PathWrap: wrap_object=Thorax method=midpoint
    Millard2012EquilibriumMuscle RHI: appliesForce=false optimal_force=1 max_isometric_force=407.4
        optimal_fiber_length=0.1152 tendon_slack_length=0.028 pennation_angle_at_optimal=0
        activation_time_constant=0.01 deactivation_time_constant=0.04
      PathPoint Rhomboideus4-P1: thorax (-0.09065969 -0.009270059 -0.0005099876)
      PathPoint Rhomboideus4-P2: scapula (-0.1062559 -0.1067126 -0.09272444)
      PathWrap: wrap_object=Thorax method=hybrid range=(1 2)
    Millard2012EquilibriumMuscle DELT1: optimal_force=1 max_isometric_force=1218.9 optimal_fiber_length=0.1047274
        tendon_slack_length=0.0997915 pennation_angle_at_optimal=0.3839724
      PathPoint P1: humerus (0.01015168 -0.1346344 0.00662805)
      PathPoint P2: humerus (0.01838859 -0.1250039 0.00466796)
      PathPoint P3: scapula (0.04347 -0.03252 0.00099)
      PathPoint P4: clavicle (-0.014 0.01106 0.08021)
      PathWrap pathwrap_0: wrap_object=DELT1hh method=hybrid range=(2 3)
    Millard2012EquilibriumMuscle DELT2: optimal_force=1 max_isometric_force=1103.5 optimal_fiber_length=0.1158305
        tendon_slack_length=0.1176571 pennation_angle_at_optimal=0.2617994
      PathPoint P1: humerus (0.00522313 -0.1542126 0.0063448)
      MovingPathPoint default: clavicle socket_x_coordinate=/jointset/shoulder1/shoulder_elev
          socket_y_coordinate=/jointset/shoulder1/shoulder_elev socket_z_coordinate=/jointset/shoulder1/shoulder_elev
        x_location: MultiplierFunction: scale=1 PiecewiseLinearFunction(x=0 2.1 3.14, y=0.02 0.02 0.015)
        y_location: MultiplierFunction: scale=1 PiecewiseLinearFunction(x=0 1.507 3.14, y=-0.01 0.035 0.055)
        z_location: MultiplierFunction: scale=1
          SimmSpline: x=(0 1.507 3.14) y=(0.186 0.171 0.126)
      PathPoint P3: scapula (5e-5 0.00294 0.02233)
      PathPoint P4: scapula (-0.01078 -0.00034 0.0062)
      PathWrap: wrap_object=Deltoid2 method=hybrid
      PathWrap pathwrap_0: wrap_object=delt2hum method=hybrid
      PathWrap pathwrap_1: wrap_object=DELT_TMAJ_LAT_PEC_CORBhh method=hybrid
    Millard2012EquilibriumMuscle DELT3: optimal_force=1 max_isometric_force=201.6 optimal_fiber_length=0.1439339
        tendon_slack_length=0.04001089 pennation_angle_at_optimal=0.3141593
      PathPoint P1: scapula (-0.05573 0.00122 -0.02512)
      PathPoint P2: scapula (-0.07247 -0.03285 0.01233)
      PathPoint P3: humerus (0.00233398 -0.08613066 0.01183985)
      PathWrap: wrap_object=Delt3 method=hybrid range=(1 2)
      PathWrap pathwrap_0: wrap_object=delt3hum method=hybrid
      PathWrap pathwrap_1: wrap_object=DELT_TMAJ_LAT_PEC_CORBhh method=hybrid
    Millard2012EquilibriumMuscle SUPSP: optimal_force=1 max_isometric_force=499.2 optimal_fiber_length=0.07042947
        tendon_slack_length=0.04079126 pennation_angle_at_optimal=0.1221731
      PathPoint P1: humerus (0.00290048 0.01204379 0.02937869)
      PathPoint P2: scapula (-0.01918 0.00127 -0.01271)
      PathPoint P3: scapula (-0.044 -0.01512 -0.05855)
      PathWrap: wrap_object=SUPSP method=hybrid
    Millard2012EquilibriumMuscle INFSP: optimal_force=1 max_isometric_force=1075.8 optimal_fiber_length=0.0768416
        tendon_slack_length=0.0313473 pennation_angle_at_optimal=0.3316126
      PathPoint P1: humerus (-0.01004971 0.00548372 0.02773584)
      PathPoint P2: scapula (-0.07382 -0.05476 -0.04781)
      PathWrap: wrap_object=INFSP method=hybrid
      PathWrap pathwrap_0: wrap_object=INFSP_and_TMIN_hum_head method=hybrid
    Millard2012EquilibriumMuscle SUBSC: optimal_force=1 max_isometric_force=1306.9 optimal_fiber_length=0.08842081
        tendon_slack_length=0.03342367 pennation_angle_at_optimal=0.3490659
      PathPoint P1: humerus (0.01589599 0.0095172 -0.01508023)
      PathPoint P2: scapula (-0.01831 -0.05223 -0.02457)
      PathPoint P3: scapula (-0.07246 -0.03943 -0.06475)
      PathWrap: wrap_object=SUBSCAP method=hybrid
    Millard2012EquilibriumMuscle TMIN: optimal_force=1 max_isometric_force=269.5 optimal_fiber_length=0.07474549
        tendon_slack_length=0.0719211 pennation_angle_at_optimal=0.418879
      PathPoint P1: humerus (-0.0012463 -0.01432112 0.02442748)
      PathPoint P2: scapula (-0.09473 -0.07991 -0.04737)
      PathPoint P3: scapula (-0.09643 -0.08121 -0.05298)
      PathWrap: wrap_object=TMIN method=hybrid range=(1 2)
      PathWrap pathwrap_0: wrap_object=INFSP_and_TMIN_hum_head method=hybrid range=(1 2)
      PathWrap pathwrap_1: wrap_object=TMINhum method=hybrid range=(1 2)
    Millard2012EquilibriumMuscle TMAJ: optimal_force=1 max_isometric_force=144 optimal_fiber_length=0.1625485
        tendon_slack_length=0.02001828 pennation_angle_at_optimal=0.2792527
      PathPoint P1: humerus (0.01130734 -0.06139727 -0.00643544)
      PathPoint P2: scapula (-0.10264 -0.10319 -0.05829)
      PathPoint P3: scapula (-0.10489 -0.10895 -0.07117)
      PathWrap: wrap_object=TMAJ_LAThum method=hybrid
      PathWrap pathwrap_0: wrap_object=LAT_TMAJhh method=hybrid range=(1 2)
      PathWrap pathwrap_1: wrap_object=LAT_TMAJ2hh method=hybrid
    Millard2012EquilibriumMuscle PECM1: optimal_force=1 max_isometric_force=444.3 optimal_fiber_length=0.1497023
        tendon_slack_length=0.002906841 pennation_angle_at_optimal=0.296706
      PathPoint P1: humerus (0.01324477 -0.04748403 0.0088374)
      MovingPathPoint default: humerus socket_x_coordinate=/jointset/shoulder1/shoulder_elev
          socket_y_coordinate=/jointset/shoulder1/shoulder_elev socket_z_coordinate=/jointset/shoulder1/shoulder_elev
        x_location: MultiplierFunction: scale=1.133 PiecewiseLinearFunction(x=0 3.14159, y=0.01615 0.02205)
        y_location: MultiplierFunction: scale=1.133 PiecewiseLinearFunction(x=0 3.14159, y=-0.04045 -0.01975)
        z_location: MultiplierFunction: scale=1.133 PiecewiseLinearFunction(x=0 3.14159, y=-0.00577 0.00863)
      MovingPathPoint default_0: thorax socket_x_coordinate=/jointset/shoulder1/shoulder_elev
          socket_y_coordinate=/jointset/shoulder1/shoulder_elev socket_z_coordinate=/jointset/shoulder1/shoulder_elev
        x_location: MultiplierFunction: scale=1 PiecewiseLinearFunction(x=0 3.14159, y=0.00958 -0.00972)
        y_location: MultiplierFunction: scale=1 PiecewiseLinearFunction(x=0 3.14159, y=-0.01509 0.03151)
        z_location: MultiplierFunction: scale=1 PiecewiseLinearFunction(x=0 3.14159, y=0.12664 0.08244)
      PathPoint P2: clavicle (0.00321 -0.00013 0.05113)
      PathWrap pathwrap_0: wrap_object=PEC12hum method=hybrid range=(2 3)
      PathWrap pathwrap_1: wrap_object=PEC1hh method=hybrid
    Millard2012EquilibriumMuscle PECM2: optimal_force=1 max_isometric_force=658.3 optimal_fiber_length=0.1403586
        tendon_slack_length=0.09019436 pennation_angle_at_optimal=0.4537856
      PathPoint P1: humerus (0.01443442 -0.04859437 0.00889405)
      MovingPathPoint default: humerus socket_x_coordinate=/jointset/shoulder1/shoulder_elev
          socket_y_coordinate=/jointset/shoulder1/shoulder_elev socket_z_coordinate=/jointset/shoulder1/shoulder_elev
        x_location: MultiplierFunction: scale=1.133 PiecewiseLinearFunction(x=0 3.14159, y=0.01453 0.02043)
        y_location: MultiplierFunction: scale=1.133 PiecewiseLinearFunction(x=0 3.14159, y=-0.04568 -0.02498)
        z_location: MultiplierFunction: scale=1.133 PiecewiseLinearFunction(x=0 3.14159, y=-0.00687 0.00753)
      MovingPathPoint default_0: thorax socket_x_coordinate=/jointset/shoulder1/shoulder_elev
          socket_y_coordinate=/jointset/shoulder1/shoulder_elev socket_z_coordinate=/jointset/shoulder1/shoulder_elev
        x_location: MultiplierFunction: scale=1 PiecewiseLinearFunction(x=0 3.14159, y=0.02018 0.02148)
        y_location: MultiplierFunction: scale=1 PiecewiseLinearFunction(x=0 3.14159, y=-0.04165 0.00155)
        z_location: MultiplierFunction: scale=1 PiecewiseLinearFunction(x=0 3.14159, y=0.1269 0.1042)
      PathPoint P4: thorax (0.03091 -0.03922 0.09705)
      PathPoint P5: thorax (0.02769 -0.04498 0.02271)
      PathWrap pathwrap_0: wrap_object=PEC12hum method=hybrid range=(2 3)
      PathWrap pathwrap_1: wrap_object=TMAJ_LAT_PEC_CORBhh method=hybrid
      PathWrap pathwrap_2: wrap_object=PEC23hh method=hybrid
    Millard2012EquilibriumMuscle PECM3: optimal_force=1 max_isometric_force=498.1 optimal_fiber_length=0.1381309
        tendon_slack_length=0.1316482 pennation_angle_at_optimal=0.4363323
      PathPoint P1: humerus (0.01437777 -0.04956875 0.0084975)
      MovingPathPoint default: humerus socket_x_coordinate=/jointset/shoulder1/shoulder_elev
          socket_y_coordinate=/jointset/shoulder1/shoulder_elev socket_z_coordinate=/jointset/shoulder1/shoulder_elev
        x_location: MultiplierFunction: scale=1.133
          SimmSpline: x=(0 0.747517 3.14159) y=(0.01243 0.014912 0.01833)
        y_location: MultiplierFunction: scale=1.133 PiecewiseLinearFunction(x=0 3.13149, y=-0.05157 -0.040096)
        z_location: MultiplierFunction: scale=1.133
          SimmSpline: x=(0 0.623056 2.29124 3.12533) y=(-0.01807 -0.008102 0.000123 -0.000324)
      MovingPathPoint default_0: thorax socket_x_coordinate=/jointset/shoulder1/shoulder_elev
          socket_y_coordinate=/jointset/shoulder1/shoulder_elev socket_z_coordinate=/jointset/shoulder1/shoulder_elev
        x_location: MultiplierFunction: scale=1 PiecewiseLinearFunction(x=0 3.14159, y=0.02984 0.02984)
        y_location: MultiplierFunction: scale=1
          SimmSpline: x=(0.0101016 1.59605 3.14159) y=(-0.070778 -0.059781 -0.0269)
        z_location: MultiplierFunction: scale=1 PiecewiseLinearFunction(x=0 3.14159, y=0.1151 0.1151)
      PathPoint P4: thorax (0.0525 -0.08417 0.08935)
      PathPoint P5: thorax (0.05724 -0.11654 0.03787)
      PathWrap pathwrap_0: wrap_object=PEC3hum method=hybrid range=(2 3)
      PathWrap pathwrap_1: wrap_object=PEC23hh method=hybrid
    Millard2012EquilibriumMuscle LAT1: appliesForce=false optimal_force=1 max_isometric_force=290.5
        optimal_fiber_length=0.2544859 tendon_slack_length=0.1202295 pennation_angle_at_optimal=0.4363323
      PathPoint P1: humerus (0.0118965 -0.03869195 -0.00739849)
      MovingPathPoint default: scapula socket_x_coordinate=/jointset/shoulder1/shoulder_elev
          socket_y_coordinate=/jointset/shoulder1/shoulder_elev socket_z_coordinate=/jointset/shoulder1/shoulder_elev
        x_location: MultiplierFunction: scale=1 PiecewiseLinearFunction(x=0 3.14159, y=-0.07947 -0.08157)
        y_location: MultiplierFunction: scale=1 PiecewiseLinearFunction(x=0 3.14159, y=-0.08581 -0.05061)
        z_location: MultiplierFunction: scale=1 PiecewiseLinearFunction(x=0 3.14159, y=-0.02188 -0.03628)
      MovingPathPoint default_0: scapula socket_x_coordinate=/jointset/shoulder1/shoulder_elev
          socket_y_coordinate=/jointset/shoulder1/shoulder_elev socket_z_coordinate=/jointset/shoulder1/shoulder_elev
        x_location: MultiplierFunction: scale=1 PiecewiseLinearFunction(x=0 3.14159, y=-0.11215 -0.10635)
        y_location: MultiplierFunction: scale=1 PiecewiseLinearFunction(x=0 3.14159, y=-0.09779 -0.04699)
        z_location: MultiplierFunction: scale=1 PiecewiseLinearFunction(x=0 3.14159, y=-0.05322 -0.09522)
      PathPoint P4: thorax (-0.11828 -0.10118 0.03316)
      PathPoint P5: thorax (-0.09578 -0.11724 0.00882)
      PathWrap: wrap_object=TMAJ_LAThum method=hybrid
      PathWrap pathwrap_0: wrap_object=LAT_TMAJhh method=hybrid range=(1 2)
      PathWrap pathwrap_1: wrap_object=LAT_TMAJ2hh method=hybrid
    Millard2012EquilibriumMuscle LAT2: appliesForce=false optimal_force=1 max_isometric_force=317.5
        optimal_fiber_length=0.2321356 tendon_slack_length=0.1762992 pennation_angle_at_optimal=0.3316126
      PathPoint P1: humerus (0.01096744 -0.04612443 -0.00692263)
      MovingPathPoint default: scapula socket_x_coordinate=/jointset/shoulder1/shoulder_elev
          socket_y_coordinate=/jointset/shoulder1/shoulder_elev socket_z_coordinate=/jointset/shoulder1/shoulder_elev
        x_location: MultiplierFunction: scale=1 PiecewiseLinearFunction(x=0 3.14159, y=-0.0764 -0.0905)
        y_location: MultiplierFunction: scale=1 PiecewiseLinearFunction(x=0 3.14159, y=-0.1022 -0.0717)
        z_location: MultiplierFunction: scale=1 PiecewiseLinearFunction(x=0 3.14159, y=-0.01808 -0.03098)
      MovingPathPoint default_0: scapula socket_x_coordinate=/jointset/shoulder1/shoulder_elev
          socket_y_coordinate=/jointset/shoulder1/shoulder_elev socket_z_coordinate=/jointset/shoulder1/shoulder_elev
        x_location: MultiplierFunction: scale=1 PiecewiseLinearFunction(x=0 3.14159, y=-0.10054 -0.12994)
        y_location: MultiplierFunction: scale=1 PiecewiseLinearFunction(x=0 3.14159, y=-0.13969 -0.07529)
        z_location: MultiplierFunction: scale=1 PiecewiseLinearFunction(x=0 3.14159, y=-0.05258 -0.12468)
      PathPoint P4: thorax (-0.10992 -0.16908 0.02878)
      PathPoint P5: thorax (-0.07186 -0.18818 0.00815)
      PathWrap: wrap_object=TMAJ_LAThum method=hybrid
      PathWrap pathwrap_0: wrap_object=LAT_TMAJhh method=hybrid range=(1 2)
      PathWrap pathwrap_1: wrap_object=LAT_TMAJ2hh method=hybrid
    Millard2012EquilibriumMuscle LAT3: appliesForce=false optimal_force=1 max_isometric_force=189
        optimal_fiber_length=0.276818 tendon_slack_length=0.1392526 pennation_angle_at_optimal=0.3665191
      PathPoint P1: humerus (0.01368664 -0.04443626 -0.00471328)
      MovingPathPoint default: scapula socket_x_coordinate=/jointset/shoulder1/shoulder_elev
          socket_y_coordinate=/jointset/shoulder1/shoulder_elev socket_z_coordinate=/jointset/shoulder1/shoulder_elev
        x_location: MultiplierFunction: scale=1 PiecewiseLinearFunction(x=0 3.14159, y=-0.05678 -0.11198)
        y_location: MultiplierFunction: scale=1 PiecewiseLinearFunction(x=0 3.14159, y=-0.13303 -0.09893)
        z_location: MultiplierFunction: scale=1 PiecewiseLinearFunction(x=0 3.14159, y=-0.0213 -0.0386)
      MovingPathPoint default_0: scapula socket_x_coordinate=/jointset/shoulder1/shoulder_elev
          socket_y_coordinate=/jointset/shoulder1/shoulder_elev socket_z_coordinate=/jointset/shoulder1/shoulder_elev
        x_location: MultiplierFunction: scale=1 PiecewiseLinearFunction(x=0 3.14159, y=-0.09449 -0.13109)
        y_location: MultiplierFunction: scale=1 PiecewiseLinearFunction(x=0 3.14159, y=-0.17553 -0.10113)
        z_location: MultiplierFunction: scale=1 PiecewiseLinearFunction(x=0 3.14159, y=-0.04406 -0.13416)
      PathPoint P4: thorax (-0.11157 -0.19387 0.05532)
      PathPoint P5: thorax (-0.07117 -0.24858 0.00907)
      PathWrap: wrap_object=TMAJ_LAThum method=hybrid
      PathWrap pathwrap_0: wrap_object=LAT_TMAJhh method=hybrid range=(1 2)
      PathWrap pathwrap_1: wrap_object=LAT_TMAJ2hh method=hybrid
    Millard2012EquilibriumMuscle CORB: optimal_force=1 max_isometric_force=208.2 optimal_fiber_length=0.105595
        tendon_slack_length=0.1099004 pennation_angle_at_optimal=0.4712389
      PathPoint P1: scapula (0.0125 -0.04127 -0.02652)
      PathPoint P2: scapula (0.00483 -0.06958 -0.01563)
      PathPoint P3: humerus (0.00841819 -0.1704938 -0.00886006)
      PathWrap: wrap_object=CORBhum method=hybrid
      PathWrap pathwrap_0: wrap_object=TMAJ_LAT_PEC_CORBhh method=hybrid
    Millard2012EquilibriumMuscle TRIlong: optimal_force=1 max_isometric_force=771.8 optimal_fiber_length=0.1519477
        tendon_slack_length=0.1621531 pennation_angle_at_optimal=0.2094395
      PathPoint P1: scapula (-0.04565 -0.04073 -0.01377)
      PathPoint P2: humerus (-0.03074962 -0.1296265 -0.00752312)
      PathPoint P3: humerus (-0.03607472 -0.2564772 -0.01378861)
      PathPoint P4: humerus (-0.01974819 -0.3031568 -0.01368664)
      PathPoint P5: ulna (-0.024528 0.0117152 -0.0008736)
      PathWrap: wrap_object=TRI method=hybrid
      PathWrap pathwrap_0: wrap_object=TRIlonghh method=hybrid range=(-1 2)
    Millard2012EquilibriumMuscle TRIlat: optimal_force=1 max_isometric_force=717.5 optimal_fiber_length=0.1289951
        tendon_slack_length=0.1110854 pennation_angle_at_optimal=0.1570796
      PathPoint P1: humerus (-0.00678667 -0.1432792 0.00484924)
      PathPoint P2: humerus (-0.02655752 -0.1646022 0.01051424)
      PathPoint P3: humerus (-0.03607472 -0.2564772 -0.01378861)
      PathPoint P4: humerus (-0.01974819 -0.3031568 -0.01368664)
      PathPoint P5: ulna (-0.024528 0.0117152 -0.0008736)
      PathWrap: wrap_object=TRI method=hybrid
    Millard2012EquilibriumMuscle TRImed: optimal_force=1 max_isometric_force=717.5 optimal_fiber_length=0.1289997
        tendon_slack_length=0.1029277 pennation_angle_at_optimal=0.1570796
      PathPoint P1: humerus (-0.00949454 -0.1551643 -0.01026498)
      PathPoint P2: humerus (-0.02946933 -0.1715249 -0.0122364)
      PathPoint P3: humerus (-0.03607472 -0.2564772 -0.01378861)
      PathPoint P4: humerus (-0.01974819 -0.3031568 -0.01368664)
      PathPoint P5: ulna (-0.024528 0.0117152 -0.0008736)
      PathWrap: wrap_object=TRI method=hybrid
    Millard2012EquilibriumMuscle SUP: appliesForce=false optimal_force=1 max_isometric_force=379.6
        optimal_fiber_length=0.03696 tendon_slack_length=0.03136 pennation_angle_at_optimal=0
      PathPoint P1: radius (0.0111552 -0.0682752 0.00084)
      PathPoint P2: radius (0.0134512 -0.057904 -0.0011984)
      PathPoint P3: ulna (-0.015232 -0.0379008 0.0225456)
      PathWrap: wrap_object=SUP method=hybrid
    Millard2012EquilibriumMuscle BIClong: optimal_force=1 max_isometric_force=525.1 optimal_fiber_length=0.1300777
        tendon_slack_length=0.3061379 pennation_angle_at_optimal=0
      PathPoint P1: scapula (-0.03123 -0.02353 -0.01305)
      PathPoint P2: scapula (-0.02094 -0.01309 -0.00461)
      PathPoint P3: humerus (0.02414423 0.02031469 0.01164724)
      PathPoint P4: humerus (0.02694274 -0.00578963 0.01360733)
      PathPoint P5: humerus (0.01523885 -0.03202991 0.00154088)
      PathPoint P6: humerus (0.01210044 -0.08764888 -0.00186945)
      PathPoint P7: humerus (0.01929499 -0.1373763 0.00027192)
      PathPoint P8: humerus (0.0258324 -0.1987282 -0.0071379)
      MovingPathPoint default: radius socket_x_coordinate=/jointset/radioulnar/pro_sup
          socket_y_coordinate=/jointset/radioulnar/pro_sup socket_z_coordinate=/jointset/radioulnar/pro_sup
        x_location: MultiplierFunction: scale=1.12
          SimmSpline: x=(-1.57561 1.57823) y=(-0.0055 0.01096)
        y_location: MultiplierFunction: scale=1.12
          PiecewiseLinearFunction: x=(-1.57561 0 1.57561) y=(-0.0282 -0.035 -0.0392)
        z_location: MultiplierFunction: scale=1.12
          SimmSpline: x=(-1.57561 0.0866167 1.57561) y=(-0.01 -0.01358 -0.01083)
      PathPoint P11: radius (-0.00224 -0.042 -0.00224)
      PathWrap: wrap_object=Elbow_BIC_BRD method=hybrid
      PathWrap pathwrap_0: wrap_object=BIClong method=hybrid range=(2 5)
    Millard2012EquilibriumMuscle BICshort: optimal_force=1 max_isometric_force=316.8 optimal_fiber_length=0.1490371
        tendon_slack_length=0.2169556 pennation_angle_at_optimal=0
      PathPoint P1: scapula (0.01268 -0.03931 -0.02625)
      PathPoint P2: scapula (0.00093 -0.06704 -0.01593)
      PathPoint P3: humerus (0.01265561 -0.08583608 -0.01247433)
      PathPoint P4: humerus (0.01929499 -0.1373763 -0.01222507)
      PathPoint P5: humerus (0.0258324 -0.1987282 -0.0071379)
      MovingPathPoint default: radius socket_x_coordinate=/jointset/radioulnar/pro_sup
          socket_y_coordinate=/jointset/radioulnar/pro_sup socket_z_coordinate=/jointset/radioulnar/pro_sup
        x_location: MultiplierFunction: scale=1.12
          SimmSpline: x=(-1.57561 1.57823) y=(-0.0055 0.01096)
        y_location: MultiplierFunction: scale=1.12
          PiecewiseLinearFunction: x=(-1.57561 0 1.57561) y=(-0.0282 -0.035 -0.0392)
        z_location: MultiplierFunction: scale=1.12
          SimmSpline: x=(-1.57561 0.0866167 1.57561) y=(-0.01 -0.01358 -0.01083)
      PathPoint P8: radius (-0.00224 -0.042 -0.00224)
      PathWrap: wrap_object=Elbow_BIC_BRD method=hybrid
    Millard2012EquilibriumMuscle BRA: optimal_force=1 max_isometric_force=1177.37 optimal_fiber_length=0.09703158
        tendon_slack_length=0.06050337 pennation_angle_at_optimal=0
      PathPoint P1: humerus (0.0077044 -0.1970287 -0.0040788)
      ConditionalPathPoint P2: humerus (0.02145902 -0.3235735 -0.01251965)
          socket_coordinate=/jointset/elbow/elbow_flexion range=(0 0.813149) [radians]
      ConditionalPathPoint P3: ulna (0.0055776 -0.0163856 0.0014336) socket_coordinate=/jointset/elbow/elbow_flexion
          range=(0 0.813149)
      PathPoint P4: ulna (-0.003584 -0.026768 0.001008)
    Millard2012EquilibriumMuscle BRD: optimal_force=1 max_isometric_force=276 optimal_fiber_length=0.1939474
        tendon_slack_length=0.1494496 pennation_angle_at_optimal=0
      PathPoint P1: humerus (-0.0111034 -0.2261808 0.00252659)
      PathPoint P2: radius (0.0400624 -0.1427104 0.025928)
      PathPoint P3: radius (0.046928 -0.24752 0.025088)
      PathWrap: wrap_object=Elbow_BIC_BRD method=hybrid
    Millard2012EquilibriumMuscle ECRL: appliesForce=false max_isometric_force=337.3 optimal_fiber_length=0.0898634
        tendon_slack_length=0.2706996 pennation_angle_at_optimal=0
      PathPoint P1: humerus (-0.0082709 -0.2955997 0.0103103)
      PathPoint P2: radius (0.035784 -0.1507856 0.0311248)
      PathPoint P3: radius (0.0475216 -0.2652608 0.040544)
      PathPoint P4: hand (0.01717 -0.02122 0.00583)
      PathWrap: wrap_object=Elbow_PT_ECRL method=hybrid
      PathWrap pathwrap_0: wrap_object=ECRL method=hybrid
    Millard2012EquilibriumMuscle ECRB: appliesForce=false max_isometric_force=252.5 optimal_fiber_length=0.06489054
        tendon_slack_length=0.246584 pennation_angle_at_optimal=0.1570796
      PathPoint P1: humerus (0.01528417 -0.3291138 0.01923834)
      PathPoint P2: radius (0.032536 -0.1465632 0.026712)
      PathPoint P3: radius (0.0397488 -0.255416 0.0440944)
      PathPoint P4: hand (0.005 -0.01136 0.0085)
      PathWrap: wrap_object=ECRB method=hybrid
    Millard2012EquilibriumMuscle ECU: appliesForce=false max_isometric_force=192.9 optimal_fiber_length=0.06923536
        tendon_slack_length=0.2543453 pennation_angle_at_optimal=0.0698132
      PathPoint P1: humerus (0.00094039 -0.3280601 0.0213004)
      PathPoint P2: ulna (-0.0155792 -0.0358512 0.0330064)
      PathPoint P3: ulna (-0.019096 -0.0607936 0.0321216)
      PathPoint P4: ulna (-0.0200816 -0.1072176 0.0367136)
      PathPoint P5: radius (-0.0159152 -0.2541952 0.0389872)
      PathPoint P6: hand (-0.02251 -0.01401 -0.00128)
      PathWrap: wrap_object=ECU method=hybrid
    Millard2012EquilibriumMuscle FCR: appliesForce=false max_isometric_force=407.9 optimal_fiber_length=0.06954129
        tendon_slack_length=0.2701923 pennation_angle_at_optimal=0.0523599
      PathPoint P1: humerus (0.00858814 -0.315042 -0.04197765)
      PathPoint P2: radius (0.023632 -0.2457616 0.0014224)
      PathPoint P3: hand (0.01124 -0.01844 -0.00418)
      PathWrap: wrap_object=Elbow_PT_ECRL method=hybrid
      PathWrap pathwrap_0: wrap_object=FCR method=hybrid
    Millard2012EquilibriumMuscle FCU: appliesForce=false max_isometric_force=479.8 optimal_fiber_length=0.05633493
        tendon_slack_length=0.2932958 pennation_angle_at_optimal=0.2094395
      PathPoint P1: humerus (0.00248127 -0.3142942 -0.0439604)
      MovingPathPoint P2: radius socket_x_coordinate=/jointset/radioulnar/pro_sup
          socket_y_coordinate=/jointset/radioulnar/pro_sup socket_z_coordinate=/jointset/radioulnar/pro_sup
        x_location: MultiplierFunction: scale=1.12
          SimmSpline: x=(-1.5708 0 1.5708) y=(0.00279 0.00949 0.01869)
        y_location: MultiplierFunction: scale=1.12
          SimmSpline: x=(-1.5708 0 1.5708) y=(-0.1838 -0.1841 -0.1821)
        z_location: MultiplierFunction: scale=1.12
          SimmSpline: x=(-1.5708 0 1.5708) y=(0.0069 0.0005 0.0002)
      PathPoint P3: radius (0.0121184 -0.2500624 0.0108528)
      PathPoint P4: hand (-0.02036 -0.01765 -0.00752)
      PathWrap: wrap_object=FCU method=hybrid
      PathWrap pathwrap_0: wrap_object=Elbow_PT_ECRL method=hybrid
    Millard2012EquilibriumMuscle PL: appliesForce=false max_isometric_force=101 optimal_fiber_length=0.07028418
        tendon_slack_length=0.2967799 pennation_angle_at_optimal=0.06981317
      PathPoint P1: humerus (0.00517781 -0.3117903 -0.04379045)
      PathPoint P2: radius (0.0283472 -0.267848 -0.0030912)
      PathPoint P3: hand (0.00917 -0.01898 -0.01754)
      PathPoint P4: hand (0.00227 -0.03096 0.00493)
      PathWrap: wrap_object=PL method=hybrid
      PathWrap pathwrap_0: wrap_object=Elbow_PT_ECRL method=hybrid
    Millard2012EquilibriumMuscle PT: appliesForce=false max_isometric_force=557.2 optimal_fiber_length=0.05521536
        tendon_slack_length=0.1099818 pennation_angle_at_optimal=0.1745329
      PathPoint P1: humerus (0.0040788 -0.3125947 -0.0413545)
      PathPoint P2: ulna (0.0094752 -0.0377776 -0.0160384)
      MovingPathPoint P3: ulna socket_x_coordinate=/jointset/radioulnar/pro_sup
          socket_y_coordinate=/jointset/radioulnar/pro_sup socket_z_coordinate=/jointset/radioulnar/pro_sup
        x_location: MultiplierFunction: scale=1.12 PiecewiseLinearFunction(x=-1.5708 1.5708, y=0.01884 0.00554)
        y_location: MultiplierFunction: scale=1.12
          SimmSpline: x=(-1.5708 1.5708) y=(-0.06086 -0.06946)
        z_location: MultiplierFunction: scale=1.12
          SimmSpline: x=(-1.5708 1.5708) y=(0.00506 -0.00944)
      ConditionalPathPoint P4: radius (0.026432 -0.104608 0.010528) socket_coordinate=/jointset/radioulnar/pro_sup
          range=(-1.5708 0.509636)
      PathPoint P5: radius (0.028448 -0.121856 0.022176)
      PathWrap: wrap_object=Elbow_PT_ECRL method=hybrid
    Millard2012EquilibriumMuscle PQ: appliesForce=false max_isometric_force=284.7 optimal_fiber_length=0.031584
        tendon_slack_length=0.0056 pennation_angle_at_optimal=0.1745329
      PathPoint P1: radius (0.036344 -0.2239776 0.0219744)
      PathPoint P2: ulna (0.0021616 -0.2348864 0.0406784)
      PathWrap: wrap_object=PQ2 method=hybrid
      PathWrap pathwrap_0: wrap_object=PQ1 method=hybrid
    ElasticFoundationForce arm-trunk: transition_velocity=0
      ContactParametersSet contact_parameters:
        ContactParameters: geometry=(sphere_arm sphere_trunk) stiffness=100000000 dissipation=0.1 static_friction=0
            dynamic_friction=0 viscous_friction=0
  MarkerSet:
    Marker shoulder: humerus (0 0.01133 0.02266)
    Marker elbow: ulna (-0.0112 0 0.0112)
    Marker wrist: hand (0 0 0)
  ContactGeometrySet:
    ContactSphere sphere_arm: socket_frame=/bodyset/humerus location=(0 -0.2 0) radius=0.03
    ContactMesh sphere_trunk: socket_frame=/bodyset/thorax location=(0 -0.2 0.018) orientation=(1.57 3.3 1.57)
        filename=ellipsoid.obj
