# OpenSim document version 40000
Model UpperLowerBodyModel:
  assembly_accuracy: 0.0001
  gravity: 0 -9.80665 0
  credits:
    Menegolo Andrea IMPORTANT NOTE: The geometry files included in the ULB_Project.zip file have similar names but different reference frames from the ones included in the OpenSim distribution. Please, include the Geometry directory from this model in the front of your GeometryPath.
  publications:
    Delp, S.L., Loan, J.P., Hoy, M.G., Zajac, F.E., Topp E.L., Rosen, J.M.: An interactive graphics-based model of the lower extremity to study orthopaedic surgical procedures, IEEE Transactions on Biomedical Engineering, vol. 37, pp. 757-767, 1990. Yamaguchi G.T., Zajac F.E.: A planar model of the knee joint to characterize the knee extensor mechanism." J . Biomecl7. vol. 21. pp. 1-10. 1989. Anderson F.C., Pandy M.G.: A dynamic optimization solution for vertical jumping in three dimensions. Computer Methods in Biomechanics and Biomedical Engineering 2:201-231, 1999. Anderson F.C., Pandy M.G.: Dynamic optimization of human walking. Journal of Biomechanical Engineering 123:381-390, 2001. Delp SL, Anderson FC, Arnold AS, Loan P, Habib A, John CT, Guendelman E, Thelen DG (in press). OpenSim: Open-source Software to Create and Analyze Dynamic Simulations of Movement. IEEE Transactions on Biomedical Engineering. (2007) Holzbaur KR, Murray WM, Delp SL.: A model of the upper extremity for simulating musculoskeletal surgery and analyzing neuromuscular control., Ann Biomed Eng. 2005 Jun;33(6):829-40. (2005)
  Ground
  BodySet:
    Body thorax: mass=26.83 [kg] mass_center=(-0.03 -0.16 0) inertia=(1.4745 0.7555 1.4314 0 0 0)
        meshes=(thorax.vtp ground_spine.vtp ground_skull.vtp ground_jaw.vtp)
      WrapEllipsoid Thorax: xyz_body_rotation=(-0.0459 0.3196 0.010899) translation=(-0.075486 -0.1273 0.0709)
          quadrant=all dimensions=(0.04 0.135 0.04)
    Body clavicle: mass=0.156 mass_center=(-0.011096 0.0063723 0.054168)
        inertia=(0.00024259 0.00025526 4.442e-5 -1.898e-5 -6.994e-5 5.371e-5) meshes=clavicle.vtp
    Body clavphant: mass=0.0001 mass_center=(0 0 0) inertia=(1 1 1 0 0 0)
    Body scapula: mass=0.70396 mass_center=(-0.054694 -0.035032 -0.043734)
        inertia=(0.0012429 0.0011504 0.0013651 0.0004494 0.00040922 0.0002411) meshes=scapula.vtp
      WrapEllipsoid trap: xyz_body_rotation=(1.54 -0.184881 -1.1423) translation=(-0.0706606 -0.0488 -0.092096)
          quadrant=all dimensions=(0.01833 0.03 0.0535)
      WrapEllipsoid Deltoid2: active=false xyz_body_rotation=(3.13042 -1.54881 -1.31423)
          translation=(-0.0058 -0.0378 0.0096) quadrant=-y dimensions=(0.033 0.04 0.035)
      WrapTorus Delt3: active=false xyz_body_rotation=(0.620988 0.32882 -0.560774) translation=(-0.0973 -0.0428 -0.037)
          quadrant=all inner_radius=0.04 outer_radius=0.06
      WrapTorus INFSP: xyz_body_rotation=(0.0253073 0.58835 0.151844) translation=(-0.0561 -0.0199 -0.0112)
          quadrant=all inner_radius=0.008 outer_radius=0.019
      WrapEllipsoid TMIN: xyz_body_rotation=(-2.09754 -0.280823 -1.76348) translation=(-0.0418 -0.0519 -0.0359)
          quadrant=x dimensions=(0.03 0.03 0.05)
      WrapCylinder TRIlongglen: xyz_body_rotation=(1.37532 -0.294612 2.43596) translation=(-0.0359 -0.0309 -0.0132)
          quadrant=x radius=0.003 length=0.03
    Body scapphant: mass=0.0001 mass_center=(0 0 0) inertia=(1 1 1 0 0 0)
    Body humphant: mass=0.0001 mass_center=(0 0 0) inertia=(1 1 1 0 0 0)
    Body humphant1: mass=0.0001 mass_center=(0 0 0) inertia=(1 1 1 0 0 0)
    Body humerus: mass=1.99757 mass_center=(0.018064 -0.140141 -0.012746)
        inertia=(0.0122776 0.00255133 0.0125789 -0.00034741 -0.0002325 0.0012293) meshes=humerus.vtp
      WrapEllipsoid DELT1hh: xyz_body_rotation=(-0.584685 1.500461 0.570374) translation=(-0.0039 -0.0127 -0.00262)
          quadrant=z dimensions=(0.05 0.05 0.04)
      WrapCylinder delt2hum: xyz_body_rotation=(1.55093 -0.0199582 0.0596618) translation=(0.0017 -0.0958 0.0011)
          quadrant=all radius=0.0109 length=0.12
      WrapEllipsoid delt3hum: xyz_body_rotation=(1.72735 0.0759218 -2.74313) translation=(0.0019 -0.0592 0.0011)
          quadrant=x dimensions=(0.01 0.01 0.05)
      WrapEllipsoid SUPSP: xyz_body_rotation=(0.0380482 0.00855211 -1.30673) translation=(0.0002 0.0077 0.0043)
          quadrant=all dimensions=(0.02 0.02 0.02)
      WrapEllipsoid INFSP_and_TMIN_hum_head: xyz_body_rotation=(-0.286583 -0.00907571 -0.0684169)
          translation=(-0.0003 0.0026 0.0038) quadrant=all dimensions=(0.02 0.025 0.02)
      WrapEllipsoid TMIN_hum_head: xyz_body_rotation=(-0.286583 -0.00907571 -0.0684169) translation=(0 0.0008 0.0008)
          quadrant=all dimensions=(0.024 0.024 0.024)
      WrapEllipsoid SUBSCAP: xyz_body_rotation=(-0.924501 0.288852 0.381529) translation=(-0.0025 0.0007 -0.0045)
          quadrant=all dimensions=(0.02 0.017 0.028)
      WrapCylinder TMINhum: xyz_body_rotation=(1.75353 0.0692896 2.74628) translation=(-0.0014 -0.0455 0) quadrant=x
          radius=0.008 length=0.1
      WrapSphere TMAJ_LAT_PEC_CORBhh: translation=(0.0007 0 0.006) quadrant=all radius=0.03
      WrapCylinder TMAJ_LAThum: xyz_body_rotation=(1.6041 0 -1.832) translation=(0 -0.0443 0.002) quadrant=all
          radius=0.009 length=0.08
      WrapEllipsoid PEC1hh: xyz_body_rotation=(-0.620465 -0.310494 0.363727) translation=(-0.0037 0.0005 -0.0025)
          quadrant=-z dimensions=(0.03 0.02 0.02)
      WrapCylinder PEC12hum: xyz_body_rotation=(1.55928 -0.0774926 -0.925897) translation=(0.002 -0.0508 -0.0017)
          quadrant=x radius=0.009 length=0.07
      WrapSphere PEC23hh: translation=(-0.0086 0.0021 -0.0004) quadrant=all radius=0.02
      WrapCylinder PEC3hum: xyz_body_rotation=(1.44094 -0.0561996 1.75196) translation=(0.0009 -0.0551 -0.0004)
          quadrant=-x radius=0.008 length=0.1
      WrapCylinder LAT_TMAJhh: active=false xyz_body_rotation=(-0.305084 -0.326 -0.86613)
          translation=(-0.0224 0.00201 0.004) quadrant=all radius=0.007 length=0.05
      WrapSphere LAT_TMAJ2hh: xyz_body_rotation=(-0.127235 0.286111 0.0197222) translation=(-0.0016 0.00292 0.002)
          quadrant=all radius=0.026
      WrapCylinder CORBhum: xyz_body_rotation=(-1.60832 0.0959931 0.875283) translation=(0.0027 -0.1202 -0.0059)
          quadrant=x radius=0.008 length=0.1
      WrapSphere TRIlonghh: xyz_body_rotation=(0.2 -3.06 -2.015) translation=(-0.008 0 0.002) quadrant=all radius=0.026
      WrapCylinder TRI: xyz_body_rotation=(-0.14015 -0.00628319 0.154985) translation=(0.0028 -0.2919 -0.0119)
          quadrant=all radius=0.016 length=0.1
      WrapSphere BIClong: xyz_body_rotation=(0 0.5 1) translation=(0.00233 0.0023 0.003) quadrant=x radius=0.025
      WrapSphere DELT_TMAJ_LAT_PEC_CORBhh: translation=(0.0007 0 0.006) quadrant=all radius=0.03
      WrapEllipsoid Elbow_BIC_BRD: xyz_body_rotation=(-0.128631 0.137532 0.0307178) translation=(0.0019 -0.289 -0.014)
          quadrant=x dimensions=(0.015 0.015 0.1)
      WrapEllipsoid Elbow_PT_ECRL: xyz_body_rotation=(-0.161094 -0.110828 0.61453) translation=(0.003 -0.2872 -0.0069)
          quadrant=x dimensions=(0.018 0.025 0.035)
    Body ulna: mass=1.1053 mass_center=(0.00971783 -0.0959509 0.024286)
        inertia=(0.00541309 0.00115318 0.00494361 0.00031686 -7.615e-5 0.00109169) meshes=ulna.vtp
      WrapCylinder PQ2: xyz_body_rotation=(1.39138 0.0689405 1.52245) translation=(-0.0012 -0.2092 0.0428) quadrant=all
          radius=0.007 length=0.01
    Body radius: mass=0.23359 mass_center=(0.0336341 -0.181559 0.0156)
        inertia=(0.00043855 8.859e-5 0.00040258 3.014e-5 -4.24e-6 6.418e-5) meshes=radius.vtp
      WrapCylinder SUP: xyz_body_rotation=(1.44775 0.304036 -2.44102) translation=(0.0045 -0.0437 0.0059) quadrant=-x
          radius=0.008 length=0.04
      WrapTorus ECU: xyz_body_rotation=(-0.986635 -0.148877 0.222704) translation=(-0.0163 -0.2417 0.0349) quadrant=all
          inner_radius=0.006 outer_radius=0.009
      WrapCylinder PQ1: xyz_body_rotation=(-1.60762 -0.0127409 -2.69025) translation=(0.0281 -0.1986 0.0288)
          quadrant=all radius=0.01 length=0.1
    Body lunate: mass=0.0001 mass_center=(0 0 0) inertia=(1e-5 1e-5 1e-5 0 0 0) meshes=lunate.vtp
      WrapEllipsoid Extensor_ellipse: xyz_body_rotation=(-0.250804 0.285536 0.232827)
          translation=(0.0007 -0.0135 0.0047) quadrant=z dimensions=(0.05 0.02 0.013)
      WrapTorus ECRL: xyz_body_rotation=(1.53833 0.234398 0.731118) translation=(0.0222 -0.0096 0.0208) quadrant=all
          inner_radius=0.008 outer_radius=0.016
      WrapTorus ECRB: xyz_body_rotation=(1.31266 -0.11781 -0.116239) translation=(0.0126 -0.0095 0.0186) quadrant=all
          inner_radius=0.008 outer_radius=0.01
      WrapTorus FCR: xyz_body_rotation=(-1.55596 -0.15324 -0.100007) translation=(0.0032 -0.0045 -0.019) quadrant=all
          inner_radius=0.001 outer_radius=0.0025
      WrapTorus FCU: xyz_body_rotation=(-1.57376 -0.0797616 0.39235) translation=(-0.0123 -0.0124 -0.0171) quadrant=all
          inner_radius=0.0068 outer_radius=0.008
      WrapEllipsoid PL: xyz_body_rotation=(-0.0315905 0.0996583 0.0633554) translation=(0.0057 -0.018 -0.0041)
          quadrant=-z dimensions=(0.025 0.014 0.012)
      WrapEllipsoid FDS: xyz_body_rotation=(0.00837758 -0.0816814 -0.0171042) translation=(0.0012 -0.0057 -0.0003)
          quadrant=-z dimensions=(0.025 0.013 0.012)
      WrapEllipsoid FDP: xyz_body_rotation=(-1.46747 -0.194604 0.121824) translation=(-0.0022 -0.0069 0.0032)
          quadrant=y dimensions=(0.025 0.013 0.012)
      WrapTorus EDCL: xyz_body_rotation=(2.36318 0.193033 -0.26913) translation=(-0.0128 -0.0133 0.0148) quadrant=all
          inner_radius=0.008 outer_radius=0.012
      WrapTorus EDCR: xyz_body_rotation=(1.98392 0.100531 0.523075) translation=(-0.0098 -0.0137 0.0166) quadrant=all
          inner_radius=0.009 outer_radius=0.011
      WrapTorus EDCM: xyz_body_rotation=(1.99317 0.19792 0.368264) translation=(-0.0007 -0.0117 0.0191) quadrant=all
          inner_radius=0.009 outer_radius=0.012
      WrapTorus EDCI: xyz_body_rotation=(1.69768 0.0897099 0.00767945) translation=(0.009 -0.0149 0.0211) quadrant=all
          inner_radius=0.009 outer_radius=0.012
      WrapEllipsoid EDM: xyz_body_rotation=(2.9627 0.159349 0.117984) translation=(-0.0167 -0.0022 0.0048) quadrant=-z
          dimensions=(0.018 0.014 0.008)
      WrapEllipsoid FPL: xyz_body_rotation=(-0.16633 -0.082205 -0.0659735) translation=(0.017 -0.025 -0.0033)
          quadrant=-z dimensions=(0.016 0.01 0.01)
    Body scaphoid: mass=0.0001 mass_center=(0 0 0) inertia=(1e-5 1e-5 1e-5 0 0 0) meshes=scaphoid.vtp
    Body pisiform: mass=0.0001 mass_center=(0 0 0) inertia=(1e-5 1e-5 1e-5 0 0 0) meshes=pisiform.vtp
    Body triquetrum: mass=0.0001 mass_center=(0 0 0) inertia=(1e-5 1e-5 1e-5 0 0 0) meshes=triquetrum.vtp
    Body capitate: mass=0.0001 mass_center=(0 0 0) inertia=(1e-5 1e-5 1e-5 0 0 0) meshes=capitate.vtp
    Body trapezium: mass=0.0001 mass_center=(0 0 0) inertia=(1e-5 1e-5 1e-5 0 0 0) meshes=trapezium.vtp
    Body trapezoid: mass=0.0001 mass_center=(0 0 0) inertia=(1e-5 1e-5 1e-5 0 0 0) meshes=trapezoid.vtp
    Body hamate: mass=0.0001 mass_center=(0 0 0) inertia=(1e-5 1e-5 1e-5 0 0 0) meshes=hamate.vtp
    Body firstmc1: mass=0.0001 mass_center=(0 0 0) inertia=(1e-5 1e-5 1e-5 0 0 0)
      WrapTorus APL: active=false xyz_body_rotation=(-1.60989 0.247837 -0.0301942) translation=(0.0082 0.0023 -0.0101)
          quadrant=all inner_radius=0.004 outer_radius=0.008
    Body firstmc: mass=0.0001 mass_center=(0 0 0) inertia=(1e-5 1e-5 1e-5 0 0 0) meshes=1mc.vtp
      WrapCylinder MPthumb: xyz_body_rotation=(0.321315 0.11013 -0.834791) translation=(0.0177 -0.0305 -0.0143)
          quadrant=all radius=0.0085 length=0.02
    Body secondmc: mass=0.0001 mass_center=(0 0 0) inertia=(1e-5 1e-5 1e-5 0 0 0) meshes=2mc.vtp
      WrapEllipsoid 2ndmcp: xyz_body_rotation=(1.48667 -1.29661 2.43072) translation=(0.0059 -0.0304 -0.0006)
          quadrant=-x dimensions=(0.005 0.005 0.03)
    Body thirdmc: mass=0.0001 mass_center=(0 0 0) inertia=(1e-5 1e-5 1e-5 0 0 0) meshes=3mc.vtp
    Body fourthmc: mass=0.0001 mass_center=(0 0 0) inertia=(1e-5 1e-5 1e-5 0 0 0) meshes=4mc.vtp
    Body fifthmc: mass=0.0001 mass_center=(0 0 0) inertia=(1e-5 1e-5 1e-5 0 0 0) meshes=5mc.vtp
    Body proximal_thumb: mass=0.0001 mass_center=(0 0 0) inertia=(1e-5 1e-5 1e-5 0 0 0) meshes=thumbprox.vtp
      WrapCylinder IPthumb: xyz_body_rotation=(0.304734 0.0129154 0.0879646) translation=(0.0121 -0.0302 -0.0096)
          quadrant=-x radius=0.0045 length=0.01
    Body distal_thumb: mass=0.0001 mass_center=(0 0 0) inertia=(1e-5 1e-5 1e-5 0 0 0) meshes=thumbdist.vtp
    Body 2proxph: mass=0.0001 mass_center=(0 0 0) inertia=(1e-5 1e-5 1e-5 0 0 0) meshes=2proxph.vtp
      WrapCylinder Secondpm: xyz_body_rotation=(0.741939 -1.47393 0.709651) translation=(0.0075 -0.0407 0.0061)
          quadrant=all radius=0.004 length=0.01
    Body 2midph: mass=0.0001 mass_center=(0 0 0) inertia=(1e-5 1e-5 1e-5 0 0 0) meshes=2midph.vtp
      WrapCylinder Secondmd: xyz_body_rotation=(0.501782 -1.41302 0.647343) translation=(0.0036 -0.0243 0.0003)
          quadrant=x radius=0.003 length=0.01
    Body 2distph: mass=0.0001 mass_center=(0 0 0) inertia=(1e-5 1e-5 1e-5 0 0 0) meshes=2distph.vtp
    Body 3proxph: mass=0.0001 mass_center=(0 0 0) inertia=(1e-5 1e-5 1e-5 0 0 0) meshes=3proxph.vtp
    Body 3midph: mass=0.0001 mass_center=(0 0 0) inertia=(1e-5 1e-5 1e-5 0 0 0) meshes=3midph.vtp
    Body 3distph: mass=0.0001 mass_center=(0 0 0) inertia=(1e-5 1e-5 1e-5 0 0 0) meshes=3distph.vtp
    Body 4proxph: mass=0.0001 mass_center=(0 0 0) inertia=(1e-5 1e-5 1e-5 0 0 0) meshes=4proxph.vtp
    Body 4midph: mass=0.0001 mass_center=(0 0 0) inertia=(1e-5 1e-5 1e-5 0 0 0) meshes=4midph.vtp
    Body 4distph: mass=0.0001 mass_center=(0 0 0) inertia=(1e-5 1e-5 1e-5 0 0 0) meshes=4distph.vtp
    Body 5proxph: mass=0.0001 mass_center=(0 0 0) inertia=(1e-5 1e-5 1e-5 0 0 0) meshes=5proxph.vtp
    Body 5midph: mass=0.0001 mass_center=(0 0 0) inertia=(1e-5 1e-5 1e-5 0 0 0) meshes=5midph.vtp
    Body 5distph: mass=0.0001 mass_center=(0 0 0) inertia=(1e-5 1e-5 1e-5 0 0 0) meshes=5distph.vtp
    Body clavicle_l: mass=0.0001 mass_center=(0 0 0) inertia=(1e-5 1e-5 1e-5 0 0 0) meshes=clavicle_l.vtp
    Body clavphant_l: mass=0.0001 mass_center=(0 0 0) inertia=(1e-5 1e-5 1e-5 0 0 0)
    Body scapula_l: mass=0.0001 mass_center=(0 0 0) inertia=(1e-5 1e-5 1e-5 0 0 0) meshes=scapula_l.vtp
      WrapEllipsoid trap_l: xyz_body_rotation=(-1.54 0.184881 -1.1423) translation=(-0.0706606 -0.0488 0.092096)
          quadrant=all dimensions=(0.01833 0.03 0.0535)
      WrapEllipsoid Deltoid2_l: active=false xyz_body_rotation=(-3.13042 1.54881 -1.31423)
          translation=(-0.0058 -0.0378 -0.0096) quadrant=-y dimensions=(0.033 0.04 0.035)
      WrapTorus Delt3_l: active=false xyz_body_rotation=(-0.620988 -0.32882 -0.560774)
          translation=(-0.0973 -0.0428 0.037) quadrant=all inner_radius=0.04 outer_radius=0.06
      WrapTorus INFSP_l: xyz_body_rotation=(-0.0253073 -0.58835 0.151844) translation=(-0.0561 -0.0199 0.0112)
          quadrant=all inner_radius=0.008 outer_radius=0.019
      WrapEllipsoid TMIN_l: xyz_body_rotation=(2.09754 0.280823 -1.76348) translation=(-0.0418 -0.0519 0.0359)
          quadrant=x dimensions=(0.03 0.03 0.05)
      WrapCylinder TRIlongglen_l: xyz_body_rotation=(-1.37532 0.294612 2.43596) translation=(-0.0359 -0.0309 0.0132)
          quadrant=x radius=0.003 length=0.03
    Body scapphant_l: mass=0.0001 mass_center=(0 0 0) inertia=(1e-5 1e-5 1e-5 0 0 0)
    Body humphant_l: mass=0.0001 mass_center=(0 0 0) inertia=(1e-5 1e-5 1e-5 0 0 0)
    Body humphant1_l: mass=0.0001 mass_center=(0 0 0) inertia=(1e-5 1e-5 1e-5 0 0 0)
    Body humerus_l: mass=1.99757 mass_center=(0.018064 -0.140141 -0.012746)
        inertia=(0.0122776 0.00255133 0.0125789 -0.00034741 -0.0002325 0.0012293) meshes=humerus_l.vtp
      WrapEllipsoid DELT1hh_l: xyz_body_rotation=(0.584685 -1.500461 0.570374) translation=(-0.0039 -0.0127 0.00262)
          quadrant=all dimensions=(0.05 0.05 0.04)
      WrapCylinder delt2hum_l: xyz_body_rotation=(-1.55093 0.0199582 0.0596618) translation=(0.0017 -0.0958 -0.0011)
          quadrant=all radius=0.0109 length=0.12
      WrapEllipsoid delt3hum_l: xyz_body_rotation=(-1.72735 -0.0759218 -2.74313) translation=(0.0019 -0.0592 -0.0011)
          quadrant=x dimensions=(0.01 0.01 0.05)
      WrapEllipsoid SUPSP_l: xyz_body_rotation=(-0.0380482 -0.00855211 -1.30673) translation=(0.0002 0.0077 -0.0043)
          quadrant=all dimensions=(0.02 0.02 0.02)
      WrapEllipsoid INFSP_and_TMIN_hum_head_l: xyz_body_rotation=(0.286583 0.00907571 -0.0684169)
          translation=(-0.0003 0.0026 -0.0038) quadrant=all dimensions=(0.02 0.025 0.02)
      WrapEllipsoid TMIN_hum_head_l: xyz_body_rotation=(0.286583 0.00907571 -0.0684169) translation=(0 0.0008 -0.0008)
          quadrant=all dimensions=(0.024 0.024 0.024)
      WrapEllipsoid SUBSCAP_l: xyz_body_rotation=(0.924501 -0.288852 0.381529) translation=(-0.0025 0.0007 0.0045)
          quadrant=all dimensions=(0.02 0.017 0.028)
      WrapCylinder TMINhum_l: xyz_body_rotation=(-1.75353 -0.0692896 2.74628) translation=(-0.0014 -0.0455 0)
          quadrant=x radius=0.008 length=0.1
      WrapSphere TMAJ_LAT_PEC_CORBhh_l: translation=(0.0007 0 -0.006) quadrant=all radius=0.03
      WrapCylinder TMAJ_LAThum_l: xyz_body_rotation=(-1.6041 0 -1.832) translation=(0 -0.0443 -0.002) quadrant=all
          radius=0.009 length=0.08
      WrapEllipsoid PEC1hh_l: xyz_body_rotation=(0.620465 0.310494 0.363727) translation=(-0.0037 0.0005 0.0025)
          quadrant=z dimensions=(0.03 0.02 0.02)
      WrapCylinder PEC12hum_l: xyz_body_rotation=(-1.55928 0.0774926 -0.925897) translation=(0.002 -0.0508 0.0017)
          quadrant=x radius=0.009 length=0.07
      WrapSphere PEC23hh_l: translation=(-0.0086 0.0021 0.0004) quadrant=all radius=0.02
      WrapCylinder PEC3hum_l: xyz_body_rotation=(-1.44094 0.0561996 1.75196) translation=(0.0009 -0.0551 0.0004)
          quadrant=-x radius=0.008 length=0.1
      WrapCylinder LAT_TMAJhh_l: active=false xyz_body_rotation=(0.305084 0.018326 -0.686613)
          translation=(-0.0224 0.0102 -0.0094) quadrant=-y radius=0.007 length=0.05
      WrapSphere LAT_TMAJ2hh_l: xyz_body_rotation=(0.127235 -0.86111 0.0197222) translation=(-0.0016 0.0092 -0.0052)
          quadrant=all radius=0.026
      WrapCylinder CORBhum_l: xyz_body_rotation=(1.60832 -0.0959931 0.875283) translation=(0.0027 -0.1202 0.0059)
          quadrant=x radius=0.008 length=0.1
      WrapSphere TRIlonghh_l: xyz_body_rotation=(-0.2 3.06 -2.015) translation=(-0.008 0 -0.002) quadrant=all
          radius=0.026
      WrapCylinder TRI_l: xyz_body_rotation=(0.14015 0.00628319 0.154985) translation=(0.0028 -0.2919 0.0119)
          quadrant=all radius=0.016 length=0.1
      WrapSphere BIClong_l: xyz_body_rotation=(0 -0.5 1) translation=(0.00233 0.0023 -0.003) quadrant=x radius=0.025
      WrapSphere DELT_TMAJ_LAT_PEC_CORBhh_l: translation=(0.0007 0 -0.006) quadrant=all radius=0.03
      WrapEllipsoid Elbow_BIC_BRD_l: xyz_body_rotation=(0.128631 -0.137532 0.0307178) translation=(0.0019 -0.289 0.014)
          quadrant=x dimensions=(0.015 0.015 0.1)
      WrapEllipsoid Elbow_PT_ECRL_l: xyz_body_rotation=(0.161094 0.110828 0.61453) translation=(0.003 -0.2872 0.0069)
          quadrant=x dimensions=(0.018 0.025 0.035)
    Body ulna_l: mass=1.1053 mass_center=(0.00971783 -0.0959509 0.024286)
        inertia=(0.00541309 0.00115318 0.00494361 0.00031686 -7.615e-5 0.00109169) meshes=ulna_l.vtp
      WrapCylinder PQ2_l: xyz_body_rotation=(-1.39138 -0.0689405 1.52245) translation=(-0.0012 -0.2092 -0.0428)
          quadrant=all radius=0.007 length=0.1
    Body radius_l: mass=0.23359 mass_center=(0.0336341 -0.181559 0.0156)
        inertia=(0.00043855 8.859e-5 0.00040258 3.014e-5 -4.24e-6 6.418e-5) meshes=radius_l.vtp
      WrapCylinder SUP_l: xyz_body_rotation=(-1.44775 -0.304036 -2.44102) translation=(0.0045 -0.0437 -0.0059)
          quadrant=-x radius=0.008 length=0.04
      WrapTorus ECU_l: xyz_body_rotation=(0.986635 0.148877 0.222704) translation=(-0.0163 -0.2417 -0.0349)
          quadrant=all inner_radius=0.006 outer_radius=0.009
      WrapCylinder PQ1_l: xyz_body_rotation=(1.60762 0.0127409 -2.69025) translation=(0.0281 -0.1986 -0.0288)
          quadrant=all radius=0.01 length=0.1
    Body lunate_l: mass=0.0001 mass_center=(0 0 0) inertia=(1e-5 1e-5 1e-5 0 0 0) meshes=lunate_l.vtp
      WrapEllipsoid Extensor_ellipse_l: xyz_body_rotation=(0.250804 -0.285536 0.232827)
          translation=(0.0007 -0.0135 -0.0047) quadrant=-z dimensions=(0.05 0.02 0.013)
      WrapTorus ECRL_l: xyz_body_rotation=(-1.53833 -0.234398 0.731118) translation=(0.0222 -0.0096 -0.0208)
          quadrant=all inner_radius=0.008 outer_radius=0.016
      WrapTorus ECRB_l: xyz_body_rotation=(-1.31266 0.11781 -0.116239) translation=(0.0126 -0.0095 -0.0186)
          quadrant=all inner_radius=0.008 outer_radius=0.01
      WrapTorus FCR_l: xyz_body_rotation=(1.55596 0.15324 -0.100007) translation=(0.0032 -0.0045 0.019) quadrant=all
          inner_radius=0.001 outer_radius=0.0025
      WrapTorus FCU_l: xyz_body_rotation=(1.57376 0.0797616 0.39235) translation=(-0.0123 -0.0124 0.0171) quadrant=all
          inner_radius=0.0068 outer_radius=0.008
      WrapEllipsoid PL_l: xyz_body_rotation=(0.0315905 -0.0996583 0.0633554) translation=(0.0057 -0.018 0.0041)
          quadrant=z dimensions=(0.025 0.014 0.012)
      WrapEllipsoid FDS_l: xyz_body_rotation=(-0.00837758 0.0816814 -0.0171042) translation=(0.0012 -0.0057 0.0003)
          quadrant=z dimensions=(0.025 0.013 0.012)
      WrapEllipsoid FDP_l: xyz_body_rotation=(1.46747 0.194604 0.121824) translation=(-0.0022 -0.0069 -0.0032)
          quadrant=y dimensions=(0.025 0.013 0.012)
      WrapTorus EDCL_l: xyz_body_rotation=(-2.36318 -0.193033 -0.26913) translation=(-0.0128 -0.0133 -0.0148)
          quadrant=all inner_radius=0.008 outer_radius=0.012
      WrapTorus EDCR_l: xyz_body_rotation=(-1.98392 -0.100531 0.523075) translation=(-0.0098 -0.0137 -0.0166)
          quadrant=all inner_radius=0.009 outer_radius=0.011
      WrapTorus EDCM_l: xyz_body_rotation=(-1.99317 -0.19792 0.368264) translation=(-0.0007 -0.0117 -0.0191)
          quadrant=all inner_radius=0.009 outer_radius=0.012
      WrapTorus EDCI_l: xyz_body_rotation=(-1.69768 -0.0897099 0.00767945) translation=(0.009 -0.0149 -0.0211)
          quadrant=all inner_radius=0.009 outer_radius=0.012
      WrapEllipsoid EDM_l: xyz_body_rotation=(-2.9627 -0.159349 0.117984) translation=(-0.0167 -0.0022 -0.0048)
          quadrant=z dimensions=(0.018 0.014 0.008)
      WrapEllipsoid FPL_l: xyz_body_rotation=(0.16633 0.082205 -0.0659735) translation=(0.017 -0.025 0.0033) quadrant=z
          dimensions=(0.016 0.01 0.01)
    Body scaphoid_l: mass=0.0001 mass_center=(0 0 0) inertia=(1e-5 1e-5 1e-5 0 0 0) meshes=scaphoid_l.vtp
    Body pisiform_l: mass=0.0001 mass_center=(0 0 0) inertia=(1e-5 1e-5 1e-5 0 0 0) meshes=pisiform_l.vtp
    Body triquetrum_l: mass=0.0001 mass_center=(0 0 0) inertia=(1e-5 1e-5 1e-5 0 0 0) meshes=triquetrum_l.vtp
    Body capitate_l: mass=0.0001 mass_center=(0 0 0) inertia=(1e-5 1e-5 1e-5 0 0 0) meshes=capitate_l.vtp
    Body trapezium_l: mass=0.0001 mass_center=(0 0 0) inertia=(1e-5 1e-5 1e-5 0 0 0) meshes=trapezium_l.vtp
    Body trapezoid_l: mass=0.0001 mass_center=(0 0 0) inertia=(1e-5 1e-5 1e-5 0 0 0) meshes=trapezoid_l.vtp
    Body hamate_l: mass=0.0001 mass_center=(0 0 0) inertia=(1e-5 1e-5 1e-5 0 0 0) meshes=hamate_l.vtp
    Body firstmc1_l: mass=0.0001 mass_center=(0 0 0) inertia=(1e-5 1e-5 1e-5 0 0 0)
      WrapTorus APL_l: active=false xyz_body_rotation=(1.60989 -0.247837 -0.0301942) translation=(0.0082 0.0023 0.0101)
          quadrant=all inner_radius=0.004 outer_radius=0.008
    Body firstmc_l: mass=0.0001 mass_center=(0 0 0) inertia=(1e-5 1e-5 1e-5 0 0 0) meshes=1mc_l.vtp
      WrapCylinder MPthumb_l: xyz_body_rotation=(-0.321315 -0.11013 -0.834791) translation=(0.0177 -0.0305 0.0143)
          quadrant=all radius=0.0085 length=0.02
    Body secondmc_l: mass=0.0001 mass_center=(0 0 0) inertia=(1e-5 1e-5 1e-5 0 0 0) meshes=2mc_l.vtp
      WrapEllipsoid 2ndmcp_l: xyz_body_rotation=(-1.48667 1.29661 2.43072) translation=(0.0059 -0.0304 0.0006)
          quadrant=-x dimensions=(0.005 0.005 0.03)
    Body thirdmc_l: mass=0.0001 mass_center=(0 0 0) inertia=(1e-5 1e-5 1e-5 0 0 0) meshes=3mc_l.vtp
    Body fourthmc_l: mass=0.0001 mass_center=(0 0 0) inertia=(1e-5 1e-5 1e-5 0 0 0) meshes=4mc_l.vtp
    Body fifthmc_l: mass=0.0001 mass_center=(0 0 0) inertia=(1e-5 1e-5 1e-5 0 0 0) meshes=5mc_l.vtp
    Body proximal_thumb_l: mass=0.0001 mass_center=(0 0 0) inertia=(1e-5 1e-5 1e-5 0 0 0) meshes=thumbprox_l.vtp
      WrapCylinder IPthumb_l: xyz_body_rotation=(-0.304734 -0.0129154 0.0879646) translation=(0.0121 -0.0302 0.0096)
          quadrant=-x radius=0.0045 length=0.01
    Body distal_thumb_l: mass=0.0001 mass_center=(0 0 0) inertia=(1e-5 1e-5 1e-5 0 0 0) meshes=thumbdist_l.vtp
    Body 2proxph_l: mass=0.0001 mass_center=(0 0 0) inertia=(1e-5 1e-5 1e-5 0 0 0) meshes=2proxph_l.vtp
      WrapCylinder Secondpm_l: xyz_body_rotation=(-0.741939 1.47393 0.709651) translation=(0.0075 -0.0407 -0.0061)
          quadrant=all radius=0.004 length=0.01
    Body 2midph_l: mass=0.0001 mass_center=(0 0 0) inertia=(1e-5 1e-5 1e-5 0 0 0) meshes=2midph_l.vtp
      WrapCylinder Secondmd_l: xyz_body_rotation=(-0.501782 1.41302 0.647343) translation=(0.0036 -0.0243 -0.0003)
          quadrant=x radius=0.003 length=0.01
    Body 2distph_l: mass=0.0001 mass_center=(0 0 0) inertia=(1e-5 1e-5 1e-5 0 0 0) meshes=2distph_l.vtp
    Body 3proxph_l: mass=0.0001 mass_center=(0 0 0) inertia=(1e-5 1e-5 1e-5 0 0 0) meshes=3proxph_l.vtp
    Body 3midph_l: mass=0.0001 mass_center=(0 0 0) inertia=(1e-5 1e-5 1e-5 0 0 0) meshes=3midph_l.vtp
    Body 3distph_l: mass=0.0001 mass_center=(0 0 0) inertia=(1e-5 1e-5 1e-5 0 0 0) meshes=3distph_l.vtp
    Body 4proxph_l: mass=0.0001 mass_center=(0 0 0) inertia=(1e-5 1e-5 1e-5 0 0 0) meshes=4proxph_l.vtp
    Body 4midph_l: mass=0.0001 mass_center=(0 0 0) inertia=(1e-5 1e-5 1e-5 0 0 0) meshes=4midph_l.vtp
    Body 4distph_l: mass=0.0001 mass_center=(0 0 0) inertia=(1e-5 1e-5 1e-5 0 0 0) meshes=4distph_l.vtp
    Body 5proxph_l: mass=0.0001 mass_center=(0 0 0) inertia=(1e-5 1e-5 1e-5 0 0 0) meshes=5proxph_l.vtp
    Body 5midph_l: mass=0.0001 mass_center=(0 0 0) inertia=(1e-5 1e-5 1e-5 0 0 0) meshes=5midph_l.vtp
    Body 5distph_l: mass=0.0001 mass_center=(0 0 0) inertia=(1e-5 1e-5 1e-5 0 0 0) meshes=5distph_l.vtp
  JointSet:
    WeldJoint ground_thorax: socket_parent_frame=ground_offset socket_child_frame=thorax_offset
      PhysicalOffsetFrame ground_offset: socket_parent=/ground translation=(0 1 0) [meters]
      PhysicalOffsetFrame thorax_offset: socket_parent=/bodyset/thorax translation=(0 0 0)
    CustomJoint sternoclavicular: socket_parent_frame=thorax_offset socket_child_frame=clavicle_offset
      Coordinate sternoclavicular_r2: default_value=-0.02112173 range=(-99999.9 99999.9) clamped=false
      Coordinate sternoclavicular_r3: default_value=0.008946168 range=(-99999.9 99999.9) clamped=false
      PhysicalOffsetFrame thorax_offset: socket_parent=/bodyset/thorax translation=(0.006325 0.00693 0.025465)
      PhysicalOffsetFrame clavicle_offset: socket_parent=/bodyset/clavicle translation=(0 0 0)
      SpatialTransform: axes_held_at_zero=(rotation3 translation1 translation2 translation3)
        TransformAxis rotation1: coordinates=sternoclavicular_r2 axis=(0.0153 0.9892987 -0.1451)
            LinearFunction(coefficients=1 0)
        TransformAxis rotation2: coordinates=sternoclavicular_r3 axis=(-0.9944725 0 -0.104997)
            LinearFunction(coefficients=1 0)
    CustomJoint unrotscap: socket_parent_frame=clavicle_offset socket_child_frame=clavphant_offset
      Coordinate unrotscap_r3: default_value=-0.008946168 range=(-99999.9 99999.9) clamped=false
      Coordinate unrotscap_r2: default_value=0.02112173 range=(-99999.9 99999.9) clamped=false
      PhysicalOffsetFrame clavicle_offset: socket_parent=/bodyset/clavicle translation=(-0.01433 0.02007 0.135535)
      PhysicalOffsetFrame clavphant_offset: socket_parent=/bodyset/clavphant translation=(0 0 0)
      SpatialTransform: axes_held_at_zero=(rotation3 translation1 translation2 translation3)
        TransformAxis rotation1: coordinates=unrotscap_r3 axis=(-0.9944725 0 -0.104997)
            LinearFunction(coefficients=1 0)
        TransformAxis rotation2: coordinates=unrotscap_r2 axis=(0.0153 0.9892987 -0.1451)
            LinearFunction(coefficients=1 0)
    CustomJoint acromioclavicular: socket_parent_frame=clavphant_offset socket_child_frame=scapula_offset
      Coordinate acromioclavicular_r2: default_value=-0.004276721 range=(-99999.9 99999.9) clamped=false
      Coordinate acromioclavicular_r3: default_value=0.03456295 range=(-99999.9 99999.9) clamped=false
      Coordinate acromioclavicular_r1: default_value=0.01553581 range=(-99999.9 99999.9) clamped=false
      PhysicalOffsetFrame clavphant_offset: socket_parent=/bodyset/clavphant translation=(0 0 0)
      PhysicalOffsetFrame scapula_offset: socket_parent=/bodyset/scapula translation=(0 0 0)
      SpatialTransform: axes_held_at_zero=(translation1 translation2 translation3)
        TransformAxis rotation1: coordinates=acromioclavicular_r2 axis=(0.1570949 0.9472686 -0.2792909)
            LinearFunction(coefficients=1 0)
        TransformAxis rotation2: coordinates=acromioclavicular_r3 axis=(-0.754084 0.297594 0.585487)
            LinearFunction(coefficients=1 0)
        TransformAxis rotation3: coordinates=acromioclavicular_r1 axis=(0.6376999 0.1186 0.7610998)
            LinearFunction(coefficients=1 0)
    CustomJoint unrothum: socket_parent_frame=scapula_offset socket_child_frame=scapphant_offset
      Coordinate unrothum_r1: default_value=-0.01553581 range=(-99999.9 99999.9) clamped=false
      Coordinate unrothum_r3: default_value=-0.03456295 range=(-99999.9 99999.9) clamped=false
      Coordinate unrothum_r2: default_value=0.004276721 range=(-99999.9 99999.9) clamped=false
      PhysicalOffsetFrame scapula_offset: socket_parent=/bodyset/scapula translation=(-0.00955 -0.034 0.009)
      PhysicalOffsetFrame scapphant_offset: socket_parent=/bodyset/scapphant translation=(0 0 0)
      SpatialTransform: axes_held_at_zero=(translation1 translation2 translation3)
        TransformAxis rotation1: coordinates=unrothum_r1 axis=(0.6376999 0.1186 0.7610998)
            LinearFunction(coefficients=1 0)
        TransformAxis rotation2: coordinates=unrothum_r3 axis=(-0.754084 0.297594 0.585487)
            LinearFunction(coefficients=1 0)
        TransformAxis rotation3: coordinates=unrothum_r2 axis=(0.1570949 0.9472686 -0.2792909)
            LinearFunction(coefficients=1 0)
    CustomJoint shoulder0: socket_parent_frame=scapphant_offset socket_child_frame=humphant_offset
      Coordinate elv_angle: default_value=1.553343 range=(-1.570796 2.268928) clamped=true locked=true
      PhysicalOffsetFrame scapphant_offset: socket_parent=/bodyset/scapphant translation=(0 0 0)
      PhysicalOffsetFrame humphant_offset: socket_parent=/bodyset/humphant translation=(0 0 0)
      SpatialTransform: axes_held_at_zero=(rotation2 rotation3 translation1 translation2 translation3)
        TransformAxis rotation1: coordinates=elv_angle axis=(0.004800001 0.9990892 0.04240001)
            LinearFunction(coefficients=1 0)
    CustomJoint shoulder1: socket_parent_frame=humphant_offset socket_child_frame=humphant1_offset
      Coordinate shoulder_elev: default_value=0.08727969 range=(0 3.141593) clamped=true locked=true
      Coordinate shoulder1_r2: default_value=-1.553343 range=(-99999.9 99999.9) clamped=false
      PhysicalOffsetFrame humphant_offset: socket_parent=/bodyset/humphant translation=(0 0 0)
      PhysicalOffsetFrame humphant1_offset: socket_parent=/bodyset/humphant1 translation=(0 0 0)
      SpatialTransform: axes_held_at_zero=(rotation3 translation1 translation2 translation3)
        TransformAxis rotation1: coordinates=shoulder_elev axis=(-0.9982614 0.002300001 0.05889802)
            LinearFunction(coefficients=1 0)
        TransformAxis rotation2: coordinates=shoulder1_r2 axis=(0.004800001 0.9990892 0.04240001)
            LinearFunction(coefficients=1 0)
    CustomJoint shoulder2: socket_parent_frame=humphant1_offset socket_child_frame=humerus_offset
      Coordinate shoulder_rot: default_value=-1.981757e-10 range=(-1.570796 0.3490659) clamped=true locked=true
      PhysicalOffsetFrame humphant1_offset: socket_parent=/bodyset/humphant1 translation=(0 0 0)
      PhysicalOffsetFrame humerus_offset: socket_parent=/bodyset/humerus translation=(0 0 0)
      SpatialTransform: axes_held_at_zero=(rotation2 rotation3 translation1 translation2 translation3)
        TransformAxis rotation1: coordinates=shoulder_rot axis=(0.004800001 0.9990892 0.04240001)
            LinearFunction(coefficients=1 0)
    CustomJoint elbow: socket_parent_frame=humerus_offset socket_child_frame=ulna_offset
      Coordinate elbow_flexion: default_value=0.1745313 range=(0 2.268928) clamped=true locked=true
      PhysicalOffsetFrame humerus_offset: socket_parent=/bodyset/humerus translation=(0.0061 -0.2904 -0.0123)
      PhysicalOffsetFrame ulna_offset: socket_parent=/bodyset/ulna translation=(0 0 0)
      SpatialTransform: axes_held_at_zero=(rotation2 rotation3 translation1 translation2 translation3)
        TransformAxis rotation1: coordinates=elbow_flexion axis=(0.04940001 0.03660001 0.9981082)
            LinearFunction(coefficients=1 0)
    CustomJoint radioulnar: socket_parent_frame=ulna_offset socket_child_frame=radius_offset
      Coordinate pro_sup: default_value=-1.136022e-19 range=(-1.570796 1.570796) clamped=true locked=true
      PhysicalOffsetFrame ulna_offset: socket_parent=/bodyset/ulna translation=(0.0004 -0.011503 0.019999)
      PhysicalOffsetFrame radius_offset: socket_parent=/bodyset/radius translation=(0 0 0)
      SpatialTransform: axes_held_at_zero=(rotation2 rotation3 translation1 translation2 translation3)
        TransformAxis rotation1: coordinates=pro_sup axis=(-0.01716099 0.9926656 -0.119668)
            LinearFunction(coefficients=1 0)
    CustomJoint radiocarpal: socket_parent_frame=radius_offset socket_child_frame=lunate_offset
      Coordinate deviation: default_value=-6.725033e-10 range=(-0.1745329 0.4363323) clamped=true locked=true
      Coordinate flexion: default_value=3.109927e-23 range=(-1.22173 1.22173) clamped=true locked=true
      PhysicalOffsetFrame radius_offset: socket_parent=/bodyset/radius translation=(0.018 -0.242 0.025)
      PhysicalOffsetFrame lunate_offset: socket_parent=/bodyset/lunate translation=(0 0 0)
      SpatialTransform: axes_held_at_zero=(rotation3 translation1 translation2 translation3)
        TransformAxis rotation1: coordinates=deviation axis=(-0.819064 -0.135611 -0.557444)
          SimmSpline: x=(-0.174533 0 0.436332) y=(-0.174533 0 0.436332)
        TransformAxis rotation2: coordinates=flexion axis=(0.9564267 -0.2522069 0.147104)
          SimmSpline: x=(-1.5708 1.5708) y=(-0.785398 0.785398)
    WeldJoint lun_scaph: socket_parent_frame=lunate_offset socket_child_frame=scaphoid_offset
      PhysicalOffsetFrame lunate_offset: socket_parent=/bodyset/lunate translation=(0.012345 -0.004464 -0.001254)
      PhysicalOffsetFrame scaphoid_offset: socket_parent=/bodyset/scaphoid translation=(0 0 0)
    WeldJoint lun_pis: socket_parent_frame=lunate_offset socket_child_frame=pisiform_offset
      PhysicalOffsetFrame lunate_offset: socket_parent=/bodyset/lunate translation=(-0.013388 -0.009886 -0.010593)
      PhysicalOffsetFrame pisiform_offset: socket_parent=/bodyset/pisiform translation=(0 0 0)
    WeldJoint lun_triq: socket_parent_frame=lunate_offset socket_child_frame=triquetrum_offset
      PhysicalOffsetFrame lunate_offset: socket_parent=/bodyset/lunate translation=(-0.010784 -0.007499 -0.001289)
      PhysicalOffsetFrame triquetrum_offset: socket_parent=/bodyset/triquetrum translation=(0 0 0)
    WeldJoint proximal_distal: socket_parent_frame=lunate_offset socket_child_frame=capitate_offset
      PhysicalOffsetFrame lunate_offset: socket_parent=/bodyset/lunate translation=(0.003992 -0.015054 0.002327)
      PhysicalOffsetFrame capitate_offset: socket_parent=/bodyset/capitate translation=(0 0 0)
    WeldJoint cap_trpzm: socket_parent_frame=capitate_offset socket_child_frame=trapezium_offset
      PhysicalOffsetFrame capitate_offset: socket_parent=/bodyset/capitate translation=(0.015293 -0.004569 -0.010308)
      PhysicalOffsetFrame trapezium_offset: socket_parent=/bodyset/trapezium translation=(0 0 0)
    WeldJoint cap_trpzd: socket_parent_frame=capitate_offset socket_child_frame=trapezoid_offset
      PhysicalOffsetFrame capitate_offset: socket_parent=/bodyset/capitate translation=(0.009143 -0.004062 -0.002464)
      PhysicalOffsetFrame trapezoid_offset: socket_parent=/bodyset/trapezoid translation=(0 0 0)
    WeldJoint cap_ham: socket_parent_frame=capitate_offset socket_child_frame=hamate_offset
      PhysicalOffsetFrame capitate_offset: socket_parent=/bodyset/capitate translation=(-0.010969 -0.002495 -0.00075)
      PhysicalOffsetFrame hamate_offset: socket_parent=/bodyset/hamate translation=(0 0 0)
    WeldJoint CMC1a: socket_parent_frame=trapezium_offset socket_child_frame=firstmc1_offset
      PhysicalOffsetFrame trapezium_offset: socket_parent=/bodyset/trapezium translation=(0 0 0)
      PhysicalOffsetFrame firstmc1_offset: socket_parent=/bodyset/firstmc1 translation=(0 0 0)
    WeldJoint CMC1b: socket_parent_frame=firstmc1_offset socket_child_frame=firstmc_offset
      PhysicalOffsetFrame firstmc1_offset: socket_parent=/bodyset/firstmc1 translation=(0.0072 -0.0054 -0.0025)
      PhysicalOffsetFrame firstmc_offset: socket_parent=/bodyset/firstmc translation=(0 0 0)
    WeldJoint CMC2: socket_parent_frame=capitate_offset socket_child_frame=secondmc_offset
      PhysicalOffsetFrame capitate_offset: socket_parent=/bodyset/capitate translation=(0.014685 -0.03762 0.005032)
      PhysicalOffsetFrame secondmc_offset: socket_parent=/bodyset/secondmc translation=(0 0 0)
    WeldJoint CMC3: socket_parent_frame=capitate_offset socket_child_frame=thirdmc_offset
      PhysicalOffsetFrame capitate_offset: socket_parent=/bodyset/capitate translation=(0.000477 -0.039239 0.007377)
      PhysicalOffsetFrame thirdmc_offset: socket_parent=/bodyset/thirdmc translation=(0 0 0)
    WeldJoint CMC4: socket_parent_frame=capitate_offset socket_child_frame=fourthmc_offset
      PhysicalOffsetFrame capitate_offset: socket_parent=/bodyset/capitate translation=(-0.012046 -0.040519 0.003513)
      PhysicalOffsetFrame fourthmc_offset: socket_parent=/bodyset/fourthmc translation=(0 0 0)
    WeldJoint CMC5: socket_parent_frame=capitate_offset socket_child_frame=fifthmc_offset
      PhysicalOffsetFrame capitate_offset: socket_parent=/bodyset/capitate translation=(-0.021896 -0.034683 -0.004218)
      PhysicalOffsetFrame fifthmc_offset: socket_parent=/bodyset/fifthmc translation=(0 0 0)
    WeldJoint MCP: socket_parent_frame=firstmc_offset socket_child_frame=proximal_thumb_offset
      PhysicalOffsetFrame firstmc_offset: socket_parent=/bodyset/firstmc translation=(0.0165 -0.0292 -0.0127)
      PhysicalOffsetFrame proximal_thumb_offset: socket_parent=/bodyset/proximal_thumb translation=(0 0 0)
    WeldJoint IP: socket_parent_frame=proximal_thumb_offset socket_child_frame=distal_thumb_offset
      PhysicalOffsetFrame proximal_thumb_offset: socket_parent=/bodyset/proximal_thumb
          translation=(0.014 -0.0259 -0.0101)
      PhysicalOffsetFrame distal_thumb_offset: socket_parent=/bodyset/distal_thumb translation=(0 0 0)
    WeldJoint 2MCP: socket_parent_frame=secondmc_offset socket_child_frame=2proxph_offset
      PhysicalOffsetFrame secondmc_offset: socket_parent=/bodyset/secondmc translation=(0.003501 -0.028243 0.00362)
      PhysicalOffsetFrame 2proxph_offset: socket_parent=/bodyset/2proxph translation=(0 0 0)
    WeldJoint 2prox-midph: socket_parent_frame=2proxph_offset socket_child_frame=2midph_offset
      PhysicalOffsetFrame 2proxph_offset: socket_parent=/bodyset/2proxph translation=(0.007517 -0.041273 0.007326)
      PhysicalOffsetFrame 2midph_offset: socket_parent=/bodyset/2midph translation=(0 0 0)
    WeldJoint 2mid-distph: socket_parent_frame=2midph_offset socket_child_frame=2distph_offset
      PhysicalOffsetFrame 2midph_offset: socket_parent=/bodyset/2midph translation=(0.003333 -0.024888 0.00122)
      PhysicalOffsetFrame 2distph_offset: socket_parent=/bodyset/2distph translation=(0 0 0)
    WeldJoint 3MCP: socket_parent_frame=thirdmc_offset socket_child_frame=3proxph_offset
      PhysicalOffsetFrame thirdmc_offset: socket_parent=/bodyset/thirdmc translation=(0.00024 -0.02629 0.001778)
      PhysicalOffsetFrame 3proxph_offset: socket_parent=/bodyset/3proxph translation=(0 0 0)
    WeldJoint 3prox-midph: socket_parent_frame=3proxph_offset socket_child_frame=3midph_offset
      PhysicalOffsetFrame 3proxph_offset: socket_parent=/bodyset/3proxph translation=(0.00165 -0.044211 0.00623)
      PhysicalOffsetFrame 3midph_offset: socket_parent=/bodyset/3midph translation=(0 0 0)
    WeldJoint 3mid-distph: socket_parent_frame=3midph_offset socket_child_frame=3distph_offset
      PhysicalOffsetFrame 3midph_offset: socket_parent=/bodyset/3midph translation=(0.001365 -0.029047 0.001954)
      PhysicalOffsetFrame 3distph_offset: socket_parent=/bodyset/3distph translation=(0 0 0)
    WeldJoint 4MCP: socket_parent_frame=fourthmc_offset socket_child_frame=4proxph_offset
      PhysicalOffsetFrame fourthmc_offset: socket_parent=/bodyset/fourthmc translation=(-0.00183 -0.023689 -0.000173)
      PhysicalOffsetFrame 4proxph_offset: socket_parent=/bodyset/4proxph translation=(0 0 0)
    WeldJoint 4prox-midph: socket_parent_frame=4proxph_offset socket_child_frame=4midph_offset
      PhysicalOffsetFrame 4proxph_offset: socket_parent=/bodyset/4proxph translation=(-0.003528 -0.040255 0.001345)
      PhysicalOffsetFrame 4midph_offset: socket_parent=/bodyset/4midph translation=(0 0 0)
    WeldJoint 4mid-distph: socket_parent_frame=4midph_offset socket_child_frame=4distph_offset
      PhysicalOffsetFrame 4midph_offset: socket_parent=/bodyset/4midph translation=(-0.002317 -0.024789 0.000563)
      PhysicalOffsetFrame 4distph_offset: socket_parent=/bodyset/4distph translation=(0 0 0)
    WeldJoint 5MCP: socket_parent_frame=fifthmc_offset socket_child_frame=5proxph_offset
      PhysicalOffsetFrame fifthmc_offset: socket_parent=/bodyset/fifthmc translation=(-0.001597 -0.021431 -0.001496)
      PhysicalOffsetFrame 5proxph_offset: socket_parent=/bodyset/5proxph translation=(0 0 0)
    WeldJoint 5prox-midph: socket_parent_frame=5proxph_offset socket_child_frame=5midph_offset
      PhysicalOffsetFrame 5proxph_offset: socket_parent=/bodyset/5proxph translation=(-0.005279 -0.035563 -0.002879)
      PhysicalOffsetFrame 5midph_offset: socket_parent=/bodyset/5midph translation=(0 0 0)
    WeldJoint 5mid-distph: socket_parent_frame=5midph_offset socket_child_frame=5distph_offset
      PhysicalOffsetFrame 5midph_offset: socket_parent=/bodyset/5midph translation=(-0.002871 -0.020677 -0.002243)
      PhysicalOffsetFrame 5distph_offset: socket_parent=/bodyset/5distph translation=(0 0 0)
    CustomJoint sternoclavicular_l: socket_parent_frame=thorax_offset socket_child_frame=clavicle_l_offset
      Coordinate sternoclavicular_r2_l: default_value=-0.03163451 range=(-99999.9 99999.9) clamped=false
      Coordinate sternoclavicular_r3_l: default_value=0.01339889 range=(-99999.9 99999.9) clamped=false
      PhysicalOffsetFrame thorax_offset: socket_parent=/bodyset/thorax translation=(0.006325 0.00693 -0.025465)
      PhysicalOffsetFrame clavicle_l_offset: socket_parent=/bodyset/clavicle_l translation=(0 0 0)
      SpatialTransform: axes_held_at_zero=(rotation3 translation1 translation2 translation3)
        TransformAxis rotation1: coordinates=sternoclavicular_r2_l axis=(-0.0153 -0.9892987 -0.1451)
            LinearFunction(coefficients=1 0)
        TransformAxis rotation2: coordinates=sternoclavicular_r3_l axis=(0.9944725 0 -0.104997)
            LinearFunction(coefficients=1 0)
    CustomJoint unrotscap_l: socket_parent_frame=clavicle_l_offset socket_child_frame=clavphant_l_offset
      Coordinate unrotscap_r3_l: default_value=-0.01339889 range=(-99999.9 99999.9) clamped=false
      Coordinate unrotscap_r2_l: default_value=0.03163451 range=(-99999.9 99999.9) clamped=false
      PhysicalOffsetFrame clavicle_l_offset: socket_parent=/bodyset/clavicle_l translation=(-0.01433 0.02007 -0.135535)
      PhysicalOffsetFrame clavphant_l_offset: socket_parent=/bodyset/clavphant_l translation=(0 0 0)
      SpatialTransform: axes_held_at_zero=(rotation3 translation1 translation2 translation3)
        TransformAxis rotation1: coordinates=unrotscap_r3_l axis=(0.9944725 0 -0.104997)
            LinearFunction(coefficients=1 0)
        TransformAxis rotation2: coordinates=unrotscap_r2_l axis=(-0.0153 -0.9892987 -0.1451)
            LinearFunction(coefficients=1 0)
    CustomJoint acromioclavicular_l: socket_parent_frame=clavphant_l_offset socket_child_frame=scapula_l_offset
      Coordinate acromioclavicular_r2_l: default_value=-0.006405345 range=(-99999.9 99999.9) clamped=false
      Coordinate acromioclavicular_r3_l: default_value=0.05176574 range=(-99999.9 99999.9) clamped=false
      Coordinate acromioclavicular_r1_l: default_value=0.02326834 range=(-99999.9 99999.9) clamped=false
      PhysicalOffsetFrame clavphant_l_offset: socket_parent=/bodyset/clavphant_l translation=(0 0 0)
      PhysicalOffsetFrame scapula_l_offset: socket_parent=/bodyset/scapula_l translation=(0 0 0)
      SpatialTransform: axes_held_at_zero=(translation1 translation2 translation3)
        TransformAxis rotation1: coordinates=acromioclavicular_r2_l axis=(-0.1570949 -0.9472686 -0.2792909)
            LinearFunction(coefficients=1 0)
        TransformAxis rotation2: coordinates=acromioclavicular_r3_l axis=(0.754084 -0.297594 0.585487)
            LinearFunction(coefficients=1 0)
        TransformAxis rotation3: coordinates=acromioclavicular_r1_l axis=(-0.6376999 -0.1186 0.7610998)
            LinearFunction(coefficients=1 0)
    CustomJoint unrothum_l: socket_parent_frame=scapula_l_offset socket_child_frame=scapphant_l_offset
      Coordinate unrothum_r1_l: default_value=-0.02326834 range=(-99999.9 99999.9) clamped=false
      Coordinate unrothum_r3_l: default_value=-0.05176574 range=(-99999.9 99999.9) clamped=false
      Coordinate unrothum_r2_l: default_value=0.006405345 range=(-99999.9 99999.9) clamped=false
      PhysicalOffsetFrame scapula_l_offset: socket_parent=/bodyset/scapula_l translation=(-0.00955 -0.034 -0.009)
      PhysicalOffsetFrame scapphant_l_offset: socket_parent=/bodyset/scapphant_l translation=(0 0 0)
      SpatialTransform: axes_held_at_zero=(translation1 translation2 translation3)
        TransformAxis rotation1: coordinates=unrothum_r1_l axis=(-0.6376999 -0.1186 0.7610998)
            LinearFunction(coefficients=1 0)
        TransformAxis rotation2: coordinates=unrothum_r3_l axis=(0.754084 -0.297594 0.585487)
            LinearFunction(coefficients=1 0)
        TransformAxis rotation3: coordinates=unrothum_r2_l axis=(-0.1570949 -0.9472686 -0.2792909)
            LinearFunction(coefficients=1 0)
    CustomJoint shoulder0_l: socket_parent_frame=scapphant_l_offset socket_child_frame=humphant_l_offset
      Coordinate elv_angle_l: default_value=1.3 range=(-1.570796 2.268928) clamped=true
      PhysicalOffsetFrame scapphant_l_offset: socket_parent=/bodyset/scapphant_l translation=(0 0 0)
      PhysicalOffsetFrame humphant_l_offset: socket_parent=/bodyset/humphant_l translation=(0 0 0)
      SpatialTransform: axes_held_at_zero=(rotation2 rotation3 translation1 translation2 translation3)
        TransformAxis rotation1: coordinates=elv_angle_l axis=(-0.004800001 -0.9990892 0.04240001)
            LinearFunction(coefficients=1 0)
    CustomJoint shoulder1_l: socket_parent_frame=humphant_l_offset socket_child_frame=humphant1_l_offset
      Coordinate shoulder_elev_l: default_value=0.15 range=(0 3.141593) clamped=true
      Coordinate shoulder1_r2_l: default_value=-1.561916 range=(-99999.9 99999.9) clamped=false
      PhysicalOffsetFrame humphant_l_offset: socket_parent=/bodyset/humphant_l translation=(0 0 0)
      PhysicalOffsetFrame humphant1_l_offset: socket_parent=/bodyset/humphant1_l translation=(0 0 0)
      SpatialTransform: axes_held_at_zero=(rotation3 translation1 translation2 translation3)
        TransformAxis rotation1: coordinates=shoulder_elev_l axis=(0.9982614 -0.002300001 0.05889802)
            LinearFunction(coefficients=1 0)
        TransformAxis rotation2: coordinates=shoulder1_r2_l axis=(-0.004800001 -0.9990892 0.04240001)
            LinearFunction(coefficients=1 0)
    CustomJoint shoulder2_l: socket_parent_frame=humphant1_l_offset socket_child_frame=humerus_l_offset
      Coordinate shoulder_rot_l: default_value=0 range=(-1.570796 0.3490659) clamped=true
      PhysicalOffsetFrame humphant1_l_offset: socket_parent=/bodyset/humphant1_l translation=(0 0 0)
      PhysicalOffsetFrame humerus_l_offset: socket_parent=/bodyset/humerus_l translation=(0 0 0)
      SpatialTransform: axes_held_at_zero=(rotation2 rotation3 translation1 translation2 translation3)
        TransformAxis rotation1: coordinates=shoulder_rot_l axis=(-0.004800001 -0.9990892 0.04240001)
            LinearFunction(coefficients=1 0)
    CustomJoint elbow_l: socket_parent_frame=humerus_l_offset socket_child_frame=ulna_l_offset
      Coordinate elbow_flexion_l: default_value=1.3 range=(0 2.268928) clamped=true
      PhysicalOffsetFrame humerus_l_offset: socket_parent=/bodyset/humerus_l translation=(0.0061 -0.2904 0.0123)
      PhysicalOffsetFrame ulna_l_offset: socket_parent=/bodyset/ulna_l translation=(0 0 0)
      SpatialTransform: axes_held_at_zero=(rotation2 rotation3 translation1 translation2 translation3)
        TransformAxis rotation1: coordinates=elbow_flexion_l axis=(-0.04940001 -0.03660001 0.9981082)
            LinearFunction(coefficients=1 0)
    CustomJoint radioulnar_l: socket_parent_frame=ulna_l_offset socket_child_frame=radius_l_offset
      Coordinate pro_sup_l: default_value=7.414987e-11 range=(-1.570796 1.570796) clamped=true locked=true
      PhysicalOffsetFrame ulna_l_offset: socket_parent=/bodyset/ulna_l translation=(0.0004 -0.011503 -0.019999)
      PhysicalOffsetFrame radius_l_offset: socket_parent=/bodyset/radius_l translation=(0 0 0)
      SpatialTransform: axes_held_at_zero=(rotation2 rotation3 translation1 translation2 translation3)
        TransformAxis rotation1: coordinates=pro_sup_l axis=(0.01716099 -0.9926656 -0.119668)
            LinearFunction(coefficients=1 0)
    CustomJoint radiocarpal_l: socket_parent_frame=radius_l_offset socket_child_frame=lunate_l_offset
      Coordinate deviation_l: default_value=7.288068e-5 range=(-0.1745329 0.4363323) clamped=true locked=true
      Coordinate flexion_l: default_value=2.067707e-18 range=(-1.22173 1.22173) clamped=true locked=true
      PhysicalOffsetFrame radius_l_offset: socket_parent=/bodyset/radius_l translation=(0.018 -0.242 -0.025)
      PhysicalOffsetFrame lunate_l_offset: socket_parent=/bodyset/lunate_l translation=(0 0 0)
      SpatialTransform: axes_held_at_zero=(rotation3 translation1 translation2 translation3)
        TransformAxis rotation1: coordinates=deviation_l axis=(0.819064 0.135611 -0.557444)
          SimmSpline: x=(-0.174533 0 0.436332) y=(-0.174533 0 0.436332)
        TransformAxis rotation2: coordinates=flexion_l axis=(-0.9564267 0.2522069 0.147104)
          SimmSpline: x=(-1.5708 1.5708) y=(-0.785398 0.785398)
    WeldJoint lun_scaph_l: socket_parent_frame=lunate_l_offset socket_child_frame=scaphoid_l_offset
      PhysicalOffsetFrame lunate_l_offset: socket_parent=/bodyset/lunate_l translation=(0.012345 -0.004464 0.001254)
      PhysicalOffsetFrame scaphoid_l_offset: socket_parent=/bodyset/scaphoid_l translation=(0 0 0)
    WeldJoint lun_pis_l: socket_parent_frame=lunate_l_offset socket_child_frame=pisiform_l_offset
      PhysicalOffsetFrame lunate_l_offset: socket_parent=/bodyset/lunate_l translation=(-0.013388 -0.009886 0.010593)
      PhysicalOffsetFrame pisiform_l_offset: socket_parent=/bodyset/pisiform_l translation=(0 0 0)
    WeldJoint lun_triq_l: socket_parent_frame=lunate_l_offset socket_child_frame=triquetrum_l_offset
      PhysicalOffsetFrame lunate_l_offset: socket_parent=/bodyset/lunate_l translation=(-0.010784 -0.007499 0.001289)
      PhysicalOffsetFrame triquetrum_l_offset: socket_parent=/bodyset/triquetrum_l translation=(0 0 0)
    WeldJoint proximal_distal_l: socket_parent_frame=lunate_l_offset socket_child_frame=capitate_l_offset
      PhysicalOffsetFrame lunate_l_offset: socket_parent=/bodyset/lunate_l translation=(0.003992 -0.015054 -0.002327)
      PhysicalOffsetFrame capitate_l_offset: socket_parent=/bodyset/capitate_l translation=(0 0 0)
    WeldJoint cap_trpzm_l: socket_parent_frame=capitate_offset socket_child_frame=trapezium_offset
      PhysicalOffsetFrame capitate_offset: socket_parent=/bodyset/capitate_l translation=(0.015293 -0.004569 0.010308)
      PhysicalOffsetFrame trapezium_offset: socket_parent=/bodyset/trapezium_l translation=(0 0 0)
    WeldJoint cap_trpzd_l: socket_parent_frame=capitate_l_offset socket_child_frame=trapezoid_l_offset
      PhysicalOffsetFrame capitate_l_offset: socket_parent=/bodyset/capitate_l
          translation=(0.009143 -0.004062 0.002464)
      PhysicalOffsetFrame trapezoid_l_offset: socket_parent=/bodyset/trapezoid_l translation=(0 0 0)
    WeldJoint cap_ham_l: socket_parent_frame=capitate_l_offset socket_child_frame=hamate_l_offset
      PhysicalOffsetFrame capitate_l_offset: socket_parent=/bodyset/capitate_l
          translation=(-0.010969 -0.002495 0.00075)
      PhysicalOffsetFrame hamate_l_offset: socket_parent=/bodyset/hamate_l translation=(0 0 0)
    WeldJoint CMC1a_l: socket_parent_frame=trapezium_l_offset socket_child_frame=firstmc1_l_offset
      PhysicalOffsetFrame trapezium_l_offset: socket_parent=/bodyset/trapezium_l translation=(0 0 0)
      PhysicalOffsetFrame firstmc1_l_offset: socket_parent=/bodyset/firstmc1_l translation=(0 0 0)
    WeldJoint CMC1b_l: socket_parent_frame=firstmc1_l_offset socket_child_frame=firstmc_l_offset
      PhysicalOffsetFrame firstmc1_l_offset: socket_parent=/bodyset/firstmc1_l translation=(0.0072 -0.0054 0.0025)
      PhysicalOffsetFrame firstmc_l_offset: socket_parent=/bodyset/firstmc_l translation=(0 0 0)
    WeldJoint CMC2_l: socket_parent_frame=capitate_l_offset socket_child_frame=secondmc_l_offset
      PhysicalOffsetFrame capitate_l_offset: socket_parent=/bodyset/capitate_l
          translation=(0.014685 -0.03762 -0.005032)
      PhysicalOffsetFrame secondmc_l_offset: socket_parent=/bodyset/secondmc_l translation=(0 0 0)
    WeldJoint CMC3_l: socket_parent_frame=capitate_l_offset socket_child_frame=thirdmc_l_offset
      PhysicalOffsetFrame capitate_l_offset: socket_parent=/bodyset/capitate_l
          translation=(0.000477 -0.039239 -0.007377)
      PhysicalOffsetFrame thirdmc_l_offset: socket_parent=/bodyset/thirdmc_l translation=(0 0 0)
    WeldJoint CMC4_l: socket_parent_frame=capitate_l_offset socket_child_frame=fourthmc_l_offset
      PhysicalOffsetFrame capitate_l_offset: socket_parent=/bodyset/capitate_l
          translation=(-0.012046 -0.040519 -0.003513)
      PhysicalOffsetFrame fourthmc_l_offset: socket_parent=/bodyset/fourthmc_l translation=(0 0 0)
    WeldJoint CMC5_l: socket_parent_frame=capitate_l_offset socket_child_frame=fifthmc_l_offset
      PhysicalOffsetFrame capitate_l_offset: socket_parent=/bodyset/capitate_l
          translation=(-0.021896 -0.034683 0.004218)
      PhysicalOffsetFrame fifthmc_l_offset: socket_parent=/bodyset/fifthmc_l translation=(0 0 0)
    WeldJoint MCP_l: socket_parent_frame=firstmc_l_offset socket_child_frame=proximal_thumb_l_offset
      PhysicalOffsetFrame firstmc_l_offset: socket_parent=/bodyset/firstmc_l translation=(0.0165 -0.0292 0.0127)
      PhysicalOffsetFrame proximal_thumb_l_offset: socket_parent=/bodyset/proximal_thumb_l translation=(0 0 0)
    WeldJoint IP_l: socket_parent_frame=proximal_thumb_l_offset socket_child_frame=distal_thumb_l_offset
      PhysicalOffsetFrame proximal_thumb_l_offset: socket_parent=/bodyset/proximal_thumb_l
          translation=(0.014 -0.0259 0.0101)
      PhysicalOffsetFrame distal_thumb_l_offset: socket_parent=/bodyset/distal_thumb_l translation=(0 0 0)
    WeldJoint 2MCP_l: socket_parent_frame=secondmc_l_offset socket_child_frame=2proxph_l_offset
      PhysicalOffsetFrame secondmc_l_offset: socket_parent=/bodyset/secondmc_l
          translation=(0.003501 -0.028243 -0.00362)
      PhysicalOffsetFrame 2proxph_l_offset: socket_parent=/bodyset/2proxph_l translation=(0 0 0)
    WeldJoint 2prox-midph_l: socket_parent_frame=2proxph_l_offset socket_child_frame=2midph_l_offset
      PhysicalOffsetFrame 2proxph_l_offset: socket_parent=/bodyset/2proxph_l translation=(0.007517 -0.041273 -0.007326)
      PhysicalOffsetFrame 2midph_l_offset: socket_parent=/bodyset/2midph_l translation=(0 0 0)
    WeldJoint 2mid-distph_l: socket_parent_frame=2midph_l_offset socket_child_frame=2distph_l_offset
      PhysicalOffsetFrame 2midph_l_offset: socket_parent=/bodyset/2midph_l translation=(0.003333 -0.024888 -0.00122)
      PhysicalOffsetFrame 2distph_l_offset: socket_parent=/bodyset/2distph_l translation=(0 0 0)
    WeldJoint 3MCP_l: socket_parent_frame=thirdmc_l_offset socket_child_frame=3proxph_l_offset
      PhysicalOffsetFrame thirdmc_l_offset: socket_parent=/bodyset/thirdmc_l translation=(0.00024 -0.02629 -0.001778)
      PhysicalOffsetFrame 3proxph_l_offset: socket_parent=/bodyset/3proxph_l translation=(0 0 0)
    WeldJoint 3prox-midph_l: socket_parent_frame=3proxph_l_offset socket_child_frame=3midph_l_offset
      PhysicalOffsetFrame 3proxph_l_offset: socket_parent=/bodyset/3proxph_l translation=(0.00165 -0.044211 -0.00623)
      PhysicalOffsetFrame 3midph_l_offset: socket_parent=/bodyset/3midph_l translation=(0 0 0)
    WeldJoint 3mid-distph_l: socket_parent_frame=3midph_l_offset socket_child_frame=3distph_l_offset
      PhysicalOffsetFrame 3midph_l_offset: socket_parent=/bodyset/3midph_l translation=(0.001365 -0.029047 -0.001954)
      PhysicalOffsetFrame 3distph_l_offset: socket_parent=/bodyset/3distph_l translation=(0 0 0)
    WeldJoint 4MCP_l: socket_parent_frame=fourthmc_l_offset socket_child_frame=4proxph_l_offset
      PhysicalOffsetFrame fourthmc_l_offset: socket_parent=/bodyset/fourthmc_l
          translation=(-0.00183 -0.023689 0.000173)
      PhysicalOffsetFrame 4proxph_l_offset: socket_parent=/bodyset/4proxph_l translation=(0 0 0)
    WeldJoint 4prox-midph_l: socket_parent_frame=4proxph_l_offset socket_child_frame=4midph_l_offset
      PhysicalOffsetFrame 4proxph_l_offset: socket_parent=/bodyset/4proxph_l
          translation=(-0.003528 -0.040255 -0.001345)
      PhysicalOffsetFrame 4midph_l_offset: socket_parent=/bodyset/4midph_l translation=(0 0 0)
    WeldJoint 4mid-distph_l: socket_parent_frame=4midph_l_offset socket_child_frame=4distph_l_offset
      PhysicalOffsetFrame 4midph_l_offset: socket_parent=/bodyset/4midph_l translation=(-0.002317 -0.024789 -0.000563)
      PhysicalOffsetFrame 4distph_l_offset: socket_parent=/bodyset/4distph_l translation=(0 0 0)
    WeldJoint 5MCP_l: socket_parent_frame=fifthmc_l_offset socket_child_frame=5proxph_l_offset
      PhysicalOffsetFrame fifthmc_l_offset: socket_parent=/bodyset/fifthmc_l translation=(-0.001597 -0.021431 0.001496)
      PhysicalOffsetFrame 5proxph_l_offset: socket_parent=/bodyset/5proxph_l translation=(0 0 0)
    WeldJoint 5prox-midph_l: socket_parent_frame=5proxph_l_offset socket_child_frame=5midph_l_offset
      PhysicalOffsetFrame 5proxph_l_offset: socket_parent=/bodyset/5proxph_l translation=(-0.005279 -0.035563 0.002879)
      PhysicalOffsetFrame 5midph_l_offset: socket_parent=/bodyset/5midph_l translation=(0 0 0)
    WeldJoint 5mid-distph_l: socket_parent_frame=5midph_l_offset socket_child_frame=5distph_l_offset
      PhysicalOffsetFrame 5midph_l_offset: socket_parent=/bodyset/5midph_l translation=(-0.002871 -0.020677 0.002243)
      PhysicalOffsetFrame 5distph_l_offset: socket_parent=/bodyset/5distph_l translation=(0 0 0)
  ConstraintSet:
    CoordinateCouplerConstraint sternoclavicular_r2_con: independent_coordinate_names=shoulder_elev
        dependent_coordinate_name=sternoclavicular_r2
      coupled_coordinates_function: SimmSpline f0: x=(0 2.61799) y=(0 -0.633555)
    CoordinateCouplerConstraint sternoclavicular_r3_con: independent_coordinate_names=shoulder_elev
        dependent_coordinate_name=sternoclavicular_r3
      coupled_coordinates_function: SimmSpline f1: x=(0 3.14159) y=(0 0.322013)
    CoordinateCouplerConstraint unrotscap_r2_con: independent_coordinate_names=shoulder_elev
        dependent_coordinate_name=unrotscap_r2
      coupled_coordinates_function: SimmSpline f2: x=(0 2.61799) y=(0 0.633555)
    CoordinateCouplerConstraint unrotscap_r3_con: independent_coordinate_names=shoulder_elev
        dependent_coordinate_name=unrotscap_r3
      coupled_coordinates_function: SimmSpline f3: x=(0 3.14159) y=(0 -0.322013)
    CoordinateCouplerConstraint acromioclavicular_r1_con: independent_coordinate_names=shoulder_elev
        dependent_coordinate_name=acromioclavicular_r1
      coupled_coordinates_function: SimmSpline f4: x=(0 2.61799) y=(0 0.466003)
    CoordinateCouplerConstraint acromioclavicular_r2_con: independent_coordinate_names=shoulder_elev
        dependent_coordinate_name=acromioclavicular_r2
      coupled_coordinates_function: SimmSpline f5: x=(0 2.61799) y=(0 -0.128282)
    CoordinateCouplerConstraint acromioclavicular_r3_con: independent_coordinate_names=shoulder_elev
        dependent_coordinate_name=acromioclavicular_r3
      coupled_coordinates_function: SimmSpline f6: x=(0 2.61799) y=(0 1.03673)
    CoordinateCouplerConstraint unrothum_r1_con: independent_coordinate_names=shoulder_elev
        dependent_coordinate_name=unrothum_r1
      coupled_coordinates_function: SimmSpline f7: x=(0 2.61799) y=(0 -0.466003)
    CoordinateCouplerConstraint unrothum_r2_con: independent_coordinate_names=shoulder_elev
        dependent_coordinate_name=unrothum_r2
      coupled_coordinates_function: SimmSpline f8: x=(0 2.61799) y=(0 0.128282)
    CoordinateCouplerConstraint unrothum_r3_con: independent_coordinate_names=shoulder_elev
        dependent_coordinate_name=unrothum_r3
      coupled_coordinates_function: SimmSpline f9: x=(0 2.61799) y=(0 -1.03673)
    CoordinateCouplerConstraint shoulder1_r2_con: independent_coordinate_names=elv_angle
        dependent_coordinate_name=shoulder1_r2
      coupled_coordinates_function: SimmSpline f11: x=(-1.5708 3.14159) y=(1.5708 -3.14159)
    CoordinateCouplerConstraint sternoclavicular_r2_con_l: independent_coordinate_names=shoulder_elev_l
        dependent_coordinate_name=sternoclavicular_r2_l
      coupled_coordinates_function: SimmSpline f0_l: x=(0 2.61799) y=(0 -0.633555)
    CoordinateCouplerConstraint sternoclavicular_r3_con_l: independent_coordinate_names=shoulder_elev_l
        dependent_coordinate_name=sternoclavicular_r3_l
      coupled_coordinates_function: SimmSpline f1_l: x=(0 3.14159) y=(0 0.322013)
    CoordinateCouplerConstraint unrotscap_r2_con_l: independent_coordinate_names=shoulder_elev_l
        dependent_coordinate_name=unrotscap_r2_l
      coupled_coordinates_function: SimmSpline f2_l: x=(0 2.61799) y=(0 0.633555)
    CoordinateCouplerConstraint unrotscap_r3_con_l: independent_coordinate_names=shoulder_elev_l
        dependent_coordinate_name=unrotscap_r3_l
      coupled_coordinates_function: SimmSpline f3_l: x=(0 3.14159) y=(0 -0.322013)
    CoordinateCouplerConstraint acromioclavicular_r1_con_l: independent_coordinate_names=shoulder_elev_l
        dependent_coordinate_name=acromioclavicular_r1_l
      coupled_coordinates_function: SimmSpline f4_l: x=(0 2.61799) y=(0 0.466003)
    CoordinateCouplerConstraint acromioclavicular_r2_con_l: independent_coordinate_names=shoulder_elev_l
        dependent_coordinate_name=acromioclavicular_r2_l
      coupled_coordinates_function: SimmSpline f5_l: x=(0 2.61799) y=(0 -0.128282)
    CoordinateCouplerConstraint acromioclavicular_r3_con_l: independent_coordinate_names=shoulder_elev_l
        dependent_coordinate_name=acromioclavicular_r3_l
      coupled_coordinates_function: SimmSpline f6_l: x=(0 2.61799) y=(0 1.03673)
    CoordinateCouplerConstraint unrothum_r1_con_l: independent_coordinate_names=shoulder_elev_l
        dependent_coordinate_name=unrothum_r1_l
      coupled_coordinates_function: SimmSpline f7_l: x=(0 2.61799) y=(0 -0.466003)
    CoordinateCouplerConstraint unrothum_r2_con_l: independent_coordinate_names=shoulder_elev_l
        dependent_coordinate_name=unrothum_r2_l
      coupled_coordinates_function: SimmSpline f8_l: x=(0 2.61799) y=(0 0.128282)
    CoordinateCouplerConstraint unrothum_r3_con_l: independent_coordinate_names=shoulder_elev_l
        dependent_coordinate_name=unrothum_r3_l
      coupled_coordinates_function: SimmSpline f9_l: x=(0 2.61799) y=(0 -1.03673)
    CoordinateCouplerConstraint shoulder1_r2_con_l: independent_coordinate_names=elv_angle_l
        dependent_coordinate_name=shoulder1_r2_l
      coupled_coordinates_function: SimmSpline f11_l: x=(-1.5708 3.14159) y=(1.5708 -3.14159)
  ForceSet:
    CoordinateLimitForce shoulder_elv_ligaments: coordinate=shoulder_elev upper_stiffness=100 [N*m/degree]
        upper_limit=150 [degrees] lower_stiffness=100 [N*m/degree] lower_limit=30 [degrees] damping=0
        transition=542.8423 [degrees]
    CoordinateLimitForce shoulder_elv_damping: coordinate=shoulder_elev upper_stiffness=1e-8 upper_limit=190
        lower_stiffness=1e-8 lower_limit=190 damping=0.001745 transition=1
    CoordinateLimitForce elv_angle_ligaments: coordinate=elv_angle upper_stiffness=100 upper_limit=100
        lower_stiffness=100 lower_limit=-60 damping=0 transition=545.4471
    CoordinateLimitForce elv_angle_damping: coordinate=elv_angle upper_stiffness=1e-8 upper_limit=190
        lower_stiffness=1e-8 lower_limit=190 damping=0.001745 transition=1
    CoordinateLimitForce shoulder_rot_ligaments: coordinate=shoulder_rot upper_stiffness=100 upper_limit=60
        lower_stiffness=100 lower_limit=-60 damping=0 transition=485.466
    CoordinateLimitForce shoulder_rot_damping: coordinate=shoulder_rot upper_stiffness=1e-8 upper_limit=190
        lower_stiffness=1e-8 lower_limit=190 damping=0.001745 transition=1
    CoordinateLimitForce elbow_flexion_ligaments: coordinate=elbow_flexion upper_stiffness=0.3037 upper_limit=85
        lower_stiffness=100 lower_limit=14 damping=0 transition=139.5813
    CoordinateLimitForce elbow_flexion_damping: coordinate=elbow_flexion upper_stiffness=1e-8 upper_limit=190
        lower_stiffness=1e-8 lower_limit=190 damping=0.001745 transition=1
    CoordinateLimitForce pro_sup_ligaments: coordinate=pro_sup upper_stiffness=50 upper_limit=60 lower_stiffness=50
        lower_limit=-60 damping=0 transition=430.1186
    CoordinateLimitForce pro_sup_damping: coordinate=pro_sup upper_stiffness=1e-8 upper_limit=190 lower_stiffness=1e-8
        lower_limit=190 damping=0.001745 transition=1
    CoordinateLimitForce shoulder_elv_ligaments_l: coordinate=shoulder_elev_l upper_stiffness=100 upper_limit=150
        lower_stiffness=100 lower_limit=30 damping=0 transition=542.8423
    CoordinateLimitForce shoulder_elv_damping_l: coordinate=shoulder_elev_l upper_stiffness=1e-8 upper_limit=190
        lower_stiffness=1e-8 lower_limit=190 damping=0.001745 transition=1
    CoordinateLimitForce elv_angle_ligaments_l: coordinate=elv_angle_l upper_stiffness=100 upper_limit=100
        lower_stiffness=100 lower_limit=-60 damping=0 transition=545.4471
    CoordinateLimitForce elv_angle_damping_l: coordinate=elv_angle_l upper_stiffness=1e-8 upper_limit=190
        lower_stiffness=1e-8 lower_limit=190 damping=0.001745 transition=1
    CoordinateLimitForce shoulder_rot_ligaments_l: coordinate=shoulder_rot_l upper_stiffness=100 upper_limit=60
        lower_stiffness=100 lower_limit=-60 damping=0 transition=485.466
    CoordinateLimitForce shoulder_rot_damping_l: coordinate=shoulder_rot_l upper_stiffness=1e-8 upper_limit=190
        lower_stiffness=1e-8 lower_limit=190 damping=0.001745 transition=1
    CoordinateLimitForce elbow_flexion_ligaments_l: coordinate=elbow_flexion_l upper_stiffness=0.3037 upper_limit=85
        lower_stiffness=100 lower_limit=14 damping=0 transition=139.5813
    CoordinateLimitForce elbow_flexion_damping_l: coordinate=elbow_flexion_l upper_stiffness=1e-8 upper_limit=190
        lower_stiffness=1e-8 lower_limit=190 damping=0.001745 transition=1
    CoordinateLimitForce pro_sup_ligaments_l: coordinate=pro_sup_l upper_stiffness=50 upper_limit=60 lower_stiffness=50
        lower_limit=-60 damping=0 transition=430.1186
    CoordinateLimitForce pro_sup_damping_l: coordinate=pro_sup_l upper_stiffness=1e-8 upper_limit=190
        lower_stiffness=1e-8 lower_limit=190 damping=0.001745 transition=1
    Millard2012EquilibriumMuscle [values shared by the 34 below unless stated]: max_contraction_velocity=10
        ignore_tendon_compliance=true ignore_activation_dynamics=true fiber_damping=0.001 minimum_activation=0.01
      ActiveForceLengthCurve: minimum_value=0
      ForceVelocityCurve: concentric_slope_at_vmax=0 concentric_slope_near_vmax=0.25 isometric_slope=5
          eccentric_slope_at_vmax=0 eccentric_slope_near_vmax=0.15 max_eccentric_velocity_force_multiplier=1.4
      FiberForceLengthCurve
      TendonForceLengthCurve
    Millard2012EquilibriumMuscle TRAPS: optimal_force=1 max_isometric_force=1043 optimal_fiber_length=0.1127
        tendon_slack_length=0.027 pennation_angle_at_optimal=0 [radians]
      PathPoint TrapeziusScapula2-P1: thorax (-0.07484987 0.04504423 0.003626318)
      PathPoint TrapeziusScapula2-P2: scapula_l (-0.05174972 0.006890282 0.02444138)
    Millard2012EquilibriumMuscle TRAPI: optimal_force=1 max_isometric_force=414.4 optimal_fiber_length=0.1264
        tendon_slack_length=0.035 pennation_angle_at_optimal=0
      PathPoint TrapeziusScapula10-P1: thorax (-0.102 -0.1345713 -0.001149972)
      PathPoint TrapeziusScapula10-P2: scapula_l (-0.076 -0.009 0.07386386)
      PathWrap pathwrap_0: wrap_object=trap_l method=hybrid
    Millard2012EquilibriumMuscle TRAPC: optimal_force=1 max_isometric_force=201.6 optimal_fiber_length=0.1127
        tendon_slack_length=0.027 pennation_angle_at_optimal=0
      PathPoint TrapeziusClavicle1-P1: thorax (-0.06226524 0.1203095 -0.002445757)
      PathPoint TrapeziusClavicle1-P2: clavicle_l (-0.03010645 0.02490017 -0.09097307)
    Millard2012EquilibriumMuscle DELT1: optimal_force=1 max_isometric_force=1218.9 optimal_fiber_length=0.0976
        tendon_slack_length=0.093 pennation_angle_at_optimal=0.3839724
      PathPoint P1: humerus_l (0.00896 -0.11883 -0.00585)
      PathPoint P2: humerus_l (0.01623 -0.11033 -0.00412)
      PathPoint P3: scapula_l (0.04347 -0.03252 -0.00099)
      PathPoint P4: clavicle_l (-0.014 0.01106 -0.08021)
      PathWrap pathwrap_0: wrap_object=DELT1hh_l method=hybrid range=(2 3)
    Millard2012EquilibriumMuscle DELT2: optimal_force=1 max_isometric_force=1103.5 optimal_fiber_length=0.1078
        tendon_slack_length=0.1095 pennation_angle_at_optimal=0.2617994
      PathPoint P1: humerus_l (0.00461 -0.13611 -0.0056)
      MovingPathPoint default: clavicle_l socket_x_coordinate=/jointset/shoulder1_l/shoulder_elev_l
          socket_y_coordinate=/jointset/shoulder1_l/shoulder_elev_l
          socket_z_coordinate=/jointset/shoulder1_l/shoulder_elev_l
          x_location=PiecewiseLinearFunction(x=0 2.1 3.14, y=0.02 0.02 0.015)
        y_location: PiecewiseLinearFunction: x=(0 1.507 3.14) y=(-0.01 0.035 0.055)
        z_location: SimmSpline: x=(0 1.507 3.14) y=(-0.186 -0.171 -0.126)
      PathPoint P3: scapula_l (5e-5 0.00294 -0.02233)
      PathPoint P4: scapula_l (-0.01078 -0.00034 -0.0062)
      PathWrap: wrap_object=Deltoid2_l method=hybrid
      PathWrap pathwrap_0: wrap_object=delt2hum_l method=hybrid
      PathWrap pathwrap_1: wrap_object=DELT_TMAJ_LAT_PEC_CORBhh_l method=hybrid
    Millard2012EquilibriumMuscle DELT3: optimal_force=1 max_isometric_force=201.6 optimal_fiber_length=0.1367
        tendon_slack_length=0.038 pennation_angle_at_optimal=0.3141593
      PathPoint P1: scapula_l (-0.05573 0.00122 0.02512)
      PathPoint P2: scapula_l (-0.07247 -0.03285 -0.01233)
      PathPoint P3: humerus_l (0.00206 -0.07602 -0.01045)
      PathWrap: wrap_object=Delt3_l method=hybrid range=(1 2)
      PathWrap pathwrap_0: wrap_object=delt3hum_l method=hybrid
      PathWrap pathwrap_1: wrap_object=DELT_TMAJ_LAT_PEC_CORBhh_l method=hybrid
    Millard2012EquilibriumMuscle SUPSP: optimal_force=1 max_isometric_force=499.2 optimal_fiber_length=0.0682
        tendon_slack_length=0.0395 pennation_angle_at_optimal=0.1221731
      PathPoint P1: humerus_l (0.00256 0.01063 -0.02593)
      PathPoint P2: scapula_l (-0.01918 0.00127 0.01271)
      PathPoint P3: scapula_l (-0.044 -0.01512 0.05855)
      PathWrap: wrap_object=SUPSP_l method=hybrid
    Millard2012EquilibriumMuscle INFSP: optimal_force=1 max_isometric_force=1075.8 optimal_fiber_length=0.0755
        tendon_slack_length=0.0308 pennation_angle_at_optimal=0.3316126
      PathPoint P1: humerus_l (-0.00887 0.00484 -0.02448)
      PathPoint P2: scapula_l (-0.07382 -0.05476 0.04781)
      PathWrap: wrap_object=INFSP_l method=hybrid
      PathWrap pathwrap_0: wrap_object=INFSP_and_TMIN_hum_head_l method=hybrid
    Millard2012EquilibriumMuscle SUBSC: optimal_force=1 max_isometric_force=1306.9 optimal_fiber_length=0.0873
        tendon_slack_length=0.033 pennation_angle_at_optimal=0.3490659
      PathPoint P1: humerus_l (0.01403 0.0084 0.01331)
      PathPoint P2: scapula_l (-0.01831 -0.05223 0.02457)
      PathPoint P3: scapula_l (-0.07246 -0.03943 0.06475)
      PathWrap: wrap_object=SUBSCAP_l method=hybrid
    Millard2012EquilibriumMuscle TMIN: optimal_force=1 max_isometric_force=269.5 optimal_fiber_length=0.0741
        tendon_slack_length=0.0713 pennation_angle_at_optimal=0.418879
      PathPoint P1: humerus_l (-0.0011 -0.01264 -0.02156)
      PathPoint P2: scapula_l (-0.09473 -0.07991 0.04737)
      PathPoint P3: scapula_l (-0.09643 -0.08121 0.05298)
      PathWrap pathwrap_1: wrap_object=TMINhum_l method=hybrid range=(1 2)
      PathWrap pathwrap_0: wrap_object=TMIN_hum_head_l method=hybrid range=(1 2)
      PathWrap: wrap_object=TMIN_l method=hybrid range=(1 2)
    Millard2012EquilibriumMuscle TMAJ: optimal_force=1 max_isometric_force=144 optimal_fiber_length=0.1624
        tendon_slack_length=0.02 pennation_angle_at_optimal=0.2792527
      PathPoint P1: humerus_l (0.00998 -0.05419 0.006)
      PathPoint P2: scapula_l (-0.10264 -0.10319 0.05829)
      PathPoint P3: scapula_l (-0.10489 -0.10895 0.07117)
      PathWrap: wrap_object=TMAJ_LAThum_l method=hybrid
      PathWrap pathwrap_0: wrap_object=LAT_TMAJhh_l method=hybrid range=(1 2)
      PathWrap pathwrap_1: wrap_object=LAT_TMAJ2hh_l method=hybrid
    Millard2012EquilibriumMuscle PECM1: optimal_force=1 max_isometric_force=444.3 optimal_fiber_length=0.1442
        tendon_slack_length=0.0028 pennation_angle_at_optimal=0.296706
      PathPoint P1: humerus_l (0.01169 -0.04191 -0.0078)
      MovingPathPoint default: humerus_l socket_x_coordinate=/jointset/shoulder1_l/shoulder_elev_l
          socket_y_coordinate=/jointset/shoulder1_l/shoulder_elev_l
          socket_z_coordinate=/jointset/shoulder1_l/shoulder_elev_l
          x_location=PiecewiseLinearFunction(x=0 3.14159, y=0.01615 0.02205)
          y_location=PiecewiseLinearFunction(x=0 3.14159, y=-0.04045 -0.01975)
          z_location=PiecewiseLinearFunction(x=0 3.14159, y=0.00577 -0.00863)
      MovingPathPoint default_0: thorax socket_x_coordinate=/jointset/shoulder1_l/shoulder_elev_l
          socket_y_coordinate=/jointset/shoulder1_l/shoulder_elev_l
          socket_z_coordinate=/jointset/shoulder1_l/shoulder_elev_l
          x_location=PiecewiseLinearFunction(x=0 3.14159, y=0.00958 -0.00972)
          y_location=PiecewiseLinearFunction(x=0 3.14159, y=-0.01509 0.03151)
          z_location=PiecewiseLinearFunction(x=0 3.14159, y=-0.12664 -0.08244)
      PathPoint P2: clavicle_l (0.00321 -0.00013 -0.05113)
      PathWrap pathwrap_0: wrap_object=PEC12hum_l method=hybrid range=(2 3)
      PathWrap pathwrap_1: wrap_object=PEC1hh_l method=hybrid
    Millard2012EquilibriumMuscle PECM2: optimal_force=1 max_isometric_force=658.3 optimal_fiber_length=0.1385
        tendon_slack_length=0.089 pennation_angle_at_optimal=0.4537856
      PathPoint P1: humerus_l (0.01274 -0.04289 -0.00785)
      MovingPathPoint default: humerus_l socket_x_coordinate=/jointset/shoulder1_l/shoulder_elev_l
          socket_y_coordinate=/jointset/shoulder1_l/shoulder_elev_l
          socket_z_coordinate=/jointset/shoulder1_l/shoulder_elev_l
          x_location=PiecewiseLinearFunction(x=0 3.14159, y=0.01453 0.02043)
          y_location=PiecewiseLinearFunction(x=0 3.14159, y=-0.04568 -0.02498)
          z_location=PiecewiseLinearFunction(x=0 3.14159, y=0.00687 -0.00753)
      MovingPathPoint default_0: thorax socket_x_coordinate=/jointset/shoulder1_l/shoulder_elev_l
          socket_y_coordinate=/jointset/shoulder1_l/shoulder_elev_l
          socket_z_coordinate=/jointset/shoulder1_l/shoulder_elev_l
          x_location=PiecewiseLinearFunction(x=0 3.14159, y=0.02018 0.02148)
          y_location=PiecewiseLinearFunction(x=0 3.14159, y=-0.04165 0.00155)
          z_location=PiecewiseLinearFunction(x=0 3.14159, y=-0.1269 -0.1042)
      PathPoint P4: thorax (0.03091 -0.03922 -0.09705)
      PathPoint P5: thorax (0.02769 -0.04498 -0.02271)
      PathWrap pathwrap_0: wrap_object=PEC12hum_l method=hybrid range=(2 3)
      PathWrap pathwrap_1: wrap_object=TMAJ_LAT_PEC_CORBhh_l method=hybrid
      PathWrap pathwrap_2: wrap_object=PEC23hh_l method=hybrid
    Millard2012EquilibriumMuscle PECM3: optimal_force=1 max_isometric_force=498.1 optimal_fiber_length=0.1385
        tendon_slack_length=0.132 pennation_angle_at_optimal=0.4363323
      PathPoint P1: humerus_l (0.01269 -0.04375 -0.0075)
      MovingPathPoint default: humerus_l socket_x_coordinate=/jointset/shoulder1_l/shoulder_elev_l
          socket_y_coordinate=/jointset/shoulder1_l/shoulder_elev_l
          socket_z_coordinate=/jointset/shoulder1_l/shoulder_elev_l
          y_location=PiecewiseLinearFunction(x=0 3.13149, y=-0.05157 -0.040096)
        x_location: SimmSpline: x=(0 0.747517 3.14159) y=(0.01243 0.014912 0.01833)
        z_location: SimmSpline: x=(0 0.623056 2.29124 3.12533) y=(0.01807 0.008102 -0.000123 0.000324)
      MovingPathPoint default_0: thorax socket_x_coordinate=/jointset/shoulder1_l/shoulder_elev_l
          socket_y_coordinate=/jointset/shoulder1_l/shoulder_elev_l
          socket_z_coordinate=/jointset/shoulder1_l/shoulder_elev_l
          x_location=PiecewiseLinearFunction(x=0 3.14159, y=0.02984 0.02984)
          z_location=PiecewiseLinearFunction(x=0 3.14159, y=-0.1151 -0.1151)
        y_location: SimmSpline: x=(0.0101016 1.59605 3.14159) y=(-0.070778 -0.059781 -0.0269)
      PathPoint P4: thorax (0.0525 -0.08417 -0.08935)
      PathPoint P5: thorax (0.05724 -0.11654 -0.03787)
      PathWrap pathwrap_0: wrap_object=PEC3hum_l method=hybrid range=(2 3)
      PathWrap pathwrap_1: wrap_object=PEC23hh_l method=hybrid
    Millard2012EquilibriumMuscle LAT1: optimal_force=1 max_isometric_force=290.5 optimal_fiber_length=0.254
        tendon_slack_length=0.12 pennation_angle_at_optimal=0.4363323
      PathPoint P1: humerus_l (0.0105 -0.03415 0.00653)
      MovingPathPoint default: scapula_l socket_x_coordinate=/jointset/shoulder1_l/shoulder_elev_l
          socket_y_coordinate=/jointset/shoulder1_l/shoulder_elev_l
          socket_z_coordinate=/jointset/shoulder1_l/shoulder_elev_l
          x_location=PiecewiseLinearFunction(x=0 3.14159, y=-0.07947 -0.08157)
          y_location=PiecewiseLinearFunction(x=0 3.14159, y=-0.08581 -0.05061)
          z_location=PiecewiseLinearFunction(x=0 3.14159, y=0.02188 0.03628)
      MovingPathPoint default_0: scapula_l socket_x_coordinate=/jointset/shoulder1_l/shoulder_elev_l
          socket_y_coordinate=/jointset/shoulder1_l/shoulder_elev_l
          socket_z_coordinate=/jointset/shoulder1_l/shoulder_elev_l
          x_location=PiecewiseLinearFunction(x=0 3.14159, y=-0.11215 -0.10635)
          y_location=PiecewiseLinearFunction(x=0 3.14159, y=-0.09779 -0.04699)
          z_location=PiecewiseLinearFunction(x=0 3.14159, y=0.05322 0.09522)
      PathPoint P4: thorax (-0.11828 -0.10118 -0.03316)
      PathPoint P5: thorax (-0.09578 -0.11724 -0.00882)
      PathWrap: wrap_object=TMAJ_LAThum_l method=hybrid
      PathWrap pathwrap_0: wrap_object=LAT_TMAJhh_l method=hybrid range=(1 2)
      PathWrap pathwrap_1: wrap_object=LAT_TMAJ2hh_l method=hybrid
    Millard2012EquilibriumMuscle LAT2: optimal_force=1 max_isometric_force=317.5 optimal_fiber_length=0.2324
        tendon_slack_length=0.1765 pennation_angle_at_optimal=0.3316126
      PathPoint P1: humerus_l (0.00968 -0.04071 0.00611)
      MovingPathPoint default: scapula_l socket_x_coordinate=/jointset/shoulder1_l/shoulder_elev_l
          socket_y_coordinate=/jointset/shoulder1_l/shoulder_elev_l
          socket_z_coordinate=/jointset/shoulder1_l/shoulder_elev_l
          x_location=PiecewiseLinearFunction(x=0 3.14159, y=-0.0764 -0.0905)
          y_location=PiecewiseLinearFunction(x=0 3.14159, y=-0.1022 -0.0717)
          z_location=PiecewiseLinearFunction(x=0 3.14159, y=0.01808 0.03098)
      MovingPathPoint default_0: scapula_l socket_x_coordinate=/jointset/shoulder1_l/shoulder_elev_l
          socket_y_coordinate=/jointset/shoulder1_l/shoulder_elev_l
          socket_z_coordinate=/jointset/shoulder1_l/shoulder_elev_l
          x_location=PiecewiseLinearFunction(x=0 3.14159, y=-0.10054 -0.12994)
          y_location=PiecewiseLinearFunction(x=0 3.14159, y=-0.13969 -0.07529)
          z_location=PiecewiseLinearFunction(x=0 3.14159, y=0.05258 0.12468)
      PathPoint P4: thorax (-0.10992 -0.16908 -0.02878)
      PathPoint P5: thorax (-0.07186 -0.18818 -0.00815)
      PathWrap: wrap_object=TMAJ_LAThum_l method=hybrid
      PathWrap pathwrap_0: wrap_object=LAT_TMAJhh_l method=hybrid range=(1 2)
      PathWrap pathwrap_1: wrap_object=LAT_TMAJ2hh_l method=hybrid
    Millard2012EquilibriumMuscle LAT3: optimal_force=1 max_isometric_force=189 optimal_fiber_length=0.2789
        tendon_slack_length=0.1403 pennation_angle_at_optimal=0.3665191
      PathPoint P1: humerus_l (0.01208 -0.03922 0.00416)
      MovingPathPoint default: scapula_l socket_x_coordinate=/jointset/shoulder1_l/shoulder_elev_l
          socket_y_coordinate=/jointset/shoulder1_l/shoulder_elev_l
          socket_z_coordinate=/jointset/shoulder1_l/shoulder_elev_l
          x_location=PiecewiseLinearFunction(x=0 3.14159, y=-0.05678 -0.11198)
          y_location=PiecewiseLinearFunction(x=0 3.14159, y=-0.13303 -0.09893)
          z_location=PiecewiseLinearFunction(x=0 3.14159, y=0.0213 0.0386)
      MovingPathPoint default_0: scapula_l socket_x_coordinate=/jointset/shoulder1_l/shoulder_elev_l
          socket_y_coordinate=/jointset/shoulder1_l/shoulder_elev_l
          socket_z_coordinate=/jointset/shoulder1_l/shoulder_elev_l
          x_location=PiecewiseLinearFunction(x=0 3.14159, y=-0.09449 -0.13109)
          y_location=PiecewiseLinearFunction(x=0 3.14159, y=-0.17553 -0.10113)
          z_location=PiecewiseLinearFunction(x=0 3.14159, y=0.04406 0.13416)
      PathPoint P4: thorax (-0.11157 -0.19387 -0.05532)
      PathPoint P5: thorax (-0.07117 -0.24858 -0.00907)
      PathWrap: wrap_object=TMAJ_LAThum_l method=hybrid
      PathWrap pathwrap_0: wrap_object=LAT_TMAJhh_l method=hybrid range=(1 2)
      PathWrap pathwrap_1: wrap_object=LAT_TMAJ2hh_l method=hybrid
    Millard2012EquilibriumMuscle CORB: optimal_force=1 max_isometric_force=208.2 optimal_fiber_length=0.0932
        tendon_slack_length=0.097 pennation_angle_at_optimal=0.4712389
      PathPoint P1: scapula_l (0.0125 -0.04127 0.02652)
      PathPoint P2: scapula_l (0.00483 -0.06958 0.01563)
      PathPoint P3: humerus_l (0.00743 -0.15048 0.00782)
      PathWrap: wrap_object=CORBhum_l method=hybrid
      PathWrap pathwrap_0: wrap_object=TMAJ_LAT_PEC_CORBhh_l method=hybrid
    Millard2012EquilibriumMuscle TRIlong: optimal_force=1 max_isometric_force=771.8 optimal_fiber_length=0.134
        tendon_slack_length=0.143 pennation_angle_at_optimal=0.2094395
      PathPoint P1: scapula_l (-0.04565 -0.04073 0.01377)
      PathPoint P2: humerus_l (-0.02714 -0.11441 0.00664)
      PathPoint P3: humerus_l (-0.03184 -0.22637 0.01217)
      PathPoint P4: humerus_l (-0.01743 -0.26757 0.01208)
      PathPoint P5: ulna_l (-0.0219 0.01046 0.00078)
      PathWrap pathwrap_0: wrap_object=TRIlonghh_l method=hybrid range=(-1 2)
      PathWrap: wrap_object=TRI_l method=hybrid
    Millard2012EquilibriumMuscle TRIlat: optimal_force=1 max_isometric_force=717.5 optimal_fiber_length=0.1138
        tendon_slack_length=0.098 pennation_angle_at_optimal=0.1570796
      PathPoint P1: humerus_l (-0.00599 -0.12646 -0.00428)
      PathPoint P2: humerus_l (-0.02344 -0.14528 -0.00928)
      PathPoint P3: humerus_l (-0.03184 -0.22637 0.01217)
      PathPoint P4: humerus_l (-0.01743 -0.26757 0.01208)
      PathPoint P5: ulna_l (-0.0219 0.01046 0.00078)
      PathWrap: wrap_object=TRI_l method=hybrid
    Millard2012EquilibriumMuscle TRImed: optimal_force=1 max_isometric_force=717.5 optimal_fiber_length=0.1138
        tendon_slack_length=0.0908 pennation_angle_at_optimal=0.1570796
      PathPoint P1: humerus_l (-0.00838 -0.13695 0.00906)
      PathPoint P2: humerus_l (-0.02601 -0.15139 0.0108)
      PathPoint P3: humerus_l (-0.03184 -0.22637 0.01217)
      PathPoint P4: humerus_l (-0.01743 -0.26757 0.01208)
      PathPoint P5: ulna_l (-0.0219 0.01046 0.00078)
      PathWrap: wrap_object=TRI_l method=hybrid
    Millard2012EquilibriumMuscle SUP: optimal_force=1 max_isometric_force=379.6 optimal_fiber_length=0.033
        tendon_slack_length=0.028 pennation_angle_at_optimal=0
      PathPoint P1: radius_l (0.00996 -0.06096 -0.00075)
      PathPoint P2: radius_l (0.01201 -0.0517 0.00107)
      PathPoint P3: ulna_l (-0.0136 -0.03384 -0.02013)
      PathWrap: wrap_object=SUP_l method=hybrid
    Millard2012EquilibriumMuscle BIClong: optimal_force=1 max_isometric_force=525.1 optimal_fiber_length=0.1157
        tendon_slack_length=0.2723 pennation_angle_at_optimal=0
      PathPoint P1: scapula_l (-0.03123 -0.02353 0.01305)
      PathPoint P2: scapula_l (-0.02094 -0.01309 0.00461)
      PathPoint P3: humerus_l (0.02131 0.01793 -0.01028)
      PathPoint P4: humerus_l (0.02378 -0.00511 -0.01201)
      PathPoint P5: humerus_l (0.01345 -0.02827 -0.00136)
      PathPoint P6: humerus_l (0.01068 -0.07736 0.00165)
      PathPoint P7: humerus_l (0.01703 -0.12125 -0.00024)
      PathPoint P8: humerus_l (0.0228 -0.1754 0.0063)
      MovingPathPoint default: radius_l socket_x_coordinate=/jointset/radioulnar_l/pro_sup_l
          socket_y_coordinate=/jointset/radioulnar_l/pro_sup_l socket_z_coordinate=/jointset/radioulnar_l/pro_sup_l
        x_location: SimmSpline: x=(-1.57561 1.57823) y=(-0.0055 0.01096)
        y_location: PiecewiseLinearFunction: x=(-1.57561 0 1.57561) y=(-0.0282 -0.035 -0.0392)
        z_location: SimmSpline: x=(-1.57561 0.0866167 1.57561) y=(0.01 0.01358 0.01083)
      PathPoint P11: radius_l (-0.002 -0.0375 0.002)
      PathWrap: wrap_object=Elbow_BIC_BRD_l method=hybrid
      PathWrap pathwrap_0: wrap_object=BIClong_l method=hybrid range=(2 5)
    Millard2012EquilibriumMuscle BICshort: optimal_force=1 max_isometric_force=316.8 optimal_fiber_length=0.1321
        tendon_slack_length=0.1923 pennation_angle_at_optimal=0
      PathPoint P1: scapula_l (0.01268 -0.03931 0.02625)
      PathPoint P2: scapula_l (0.00093 -0.06704 0.01593)
      PathPoint P3: humerus_l (0.01117 -0.07576 0.01101)
      PathPoint P4: humerus_l (0.01703 -0.12125 0.01079)
      PathPoint P5: humerus_l (0.0228 -0.1754 0.0063)
      MovingPathPoint default: radius_l socket_x_coordinate=/jointset/radioulnar_l/pro_sup_l
          socket_y_coordinate=/jointset/radioulnar_l/pro_sup_l socket_z_coordinate=/jointset/radioulnar_l/pro_sup_l
        x_location: SimmSpline: x=(-1.57561 1.57823) y=(-0.0055 0.01096)
        y_location: PiecewiseLinearFunction: x=(-1.57561 0 1.57561) y=(-0.0282 -0.035 -0.0392)
        z_location: SimmSpline: x=(-1.57561 0.0866167 1.57561) y=(0.01 0.01358 0.01083)
      PathPoint P8: radius_l (-0.002 -0.0375 0.002)
      PathWrap: wrap_object=Elbow_BIC_BRD_l method=hybrid
    Millard2012EquilibriumMuscle BRA: optimal_force=1 max_isometric_force=1177.37 optimal_fiber_length=0.0858
        tendon_slack_length=0.0535 pennation_angle_at_optimal=0
      PathPoint P1: humerus_l (0.0068 -0.1739 0.0036)
      ConditionalPathPoint P2: humerus_l (0.01894 -0.28559 0.01105) socket_coordinate=/jointset/elbow_l/elbow_flexion_l
          range=(0 0.813149) [radians]
      ConditionalPathPoint P3: ulna_l (0.00498 -0.01463 -0.00128) socket_coordinate=/jointset/elbow_l/elbow_flexion_l
          range=(0 0.813149)
      PathPoint P4: ulna_l (-0.0032 -0.0239 -0.0009)
    Millard2012EquilibriumMuscle BRD: optimal_force=1 max_isometric_force=276 optimal_fiber_length=0.1726
        tendon_slack_length=0.133 pennation_angle_at_optimal=0
      PathPoint P1: humerus_l (-0.0098 -0.19963 -0.00223)
      PathPoint P2: radius_l (0.03577 -0.12742 -0.02315)
      PathPoint P3: radius_l (0.0419 -0.221 -0.0224)
      PathWrap: wrap_object=Elbow_BIC_BRD_l method=hybrid
    Millard2012EquilibriumMuscle ECRL: max_isometric_force=337.3 optimal_fiber_length=0.081 tendon_slack_length=0.244
        pennation_angle_at_optimal=0
      PathPoint P1: humerus_l (-0.0073 -0.2609 -0.0091)
      PathPoint P2: radius_l (0.03195 -0.13463 -0.02779)
      PathPoint P3: radius_l (0.04243 -0.23684 -0.0362)
      PathPoint P4: secondmc_l (0.00249 0.0164 -0.0008)
      PathWrap: wrap_object=Elbow_PT_ECRL_l method=hybrid
      PathWrap pathwrap_0: wrap_object=ECRL_l method=hybrid
    Millard2012EquilibriumMuscle ECRB: max_isometric_force=252.5 optimal_fiber_length=0.0585 tendon_slack_length=0.2223
        pennation_angle_at_optimal=0.1570796
      PathPoint P1: humerus_l (0.01349 -0.29048 -0.01698)
      PathPoint P2: radius_l (0.02905 -0.13086 -0.02385)
      PathPoint P3: radius_l (0.03549 -0.22805 -0.03937)
      PathPoint P4: thirdmc_l (0.00452 0.02788 -0.00112)
      PathWrap: wrap_object=ECRB_l method=hybrid
    Millard2012EquilibriumMuscle ECU: max_isometric_force=192.9 optimal_fiber_length=0.0622 tendon_slack_length=0.2285
        pennation_angle_at_optimal=0.0698132
      PathPoint P1: humerus_l (0.00083 -0.28955 -0.0188)
      PathPoint P2: ulna_l (-0.01391 -0.03201 -0.02947)
      PathPoint P3: ulna_l (-0.01705 -0.05428 -0.02868)
      PathPoint P4: ulna_l (-0.01793 -0.09573 -0.03278)
      PathPoint P5: radius_l (-0.01421 -0.22696 -0.03481)
      PathPoint P6: fifthmc_l (-0.00061 0.02067 -0.00294)
      PathWrap: wrap_object=ECU_l method=hybrid
    Millard2012EquilibriumMuscle FCR: max_isometric_force=407.9 optimal_fiber_length=0.0628 tendon_slack_length=0.244
        pennation_angle_at_optimal=0.0523599
      PathPoint P1: humerus_l (0.00758 -0.27806 0.03705)
      PathPoint P2: radius_l (0.0211 -0.21943 -0.00127)
      PathPoint P3: secondmc_l (-0.00345 0.01918 0.00921)
      PathWrap: wrap_object=Elbow_PT_ECRL_l method=hybrid
      PathWrap pathwrap_0: wrap_object=FCR_l method=hybrid
    Millard2012EquilibriumMuscle FCU: max_isometric_force=479.8 optimal_fiber_length=0.0509 tendon_slack_length=0.265
        pennation_angle_at_optimal=0.2094395
      PathPoint P1: humerus_l (0.00219 -0.2774 0.0388)
      MovingPathPoint P2: radius_l socket_x_coordinate=/jointset/radioulnar_l/pro_sup_l
          socket_y_coordinate=/jointset/radioulnar_l/pro_sup_l socket_z_coordinate=/jointset/radioulnar_l/pro_sup_l
        x_location: SimmSpline: x=(-1.5708 0 1.5708) y=(0.00279 0.00949 0.01869)
        y_location: SimmSpline: x=(-1.5708 0 1.5708) y=(-0.1838 -0.1841 -0.1821)
        z_location: SimmSpline: x=(-1.5708 0 1.5708) y=(-0.0069 -0.0005 -0.0002)
      PathPoint P3: radius_l (0.01082 -0.22327 -0.00969)
      PathPoint P4: fifthmc_l (0.00154 0.01703 0.0033)
      PathWrap: wrap_object=FCU_l method=hybrid
      PathWrap pathwrap_0: wrap_object=Elbow_PT_ECRL_l method=hybrid
    Millard2012EquilibriumMuscle PL: max_isometric_force=101 optimal_fiber_length=0.0638 tendon_slack_length=0.2694
        pennation_angle_at_optimal=0.06981317
      PathPoint P1: humerus_l (0.00457 -0.27519 0.03865)
      PathPoint P2: radius_l (0.02531 -0.23915 0.00276)
      PathPoint P3: capitate_l (0.00917 -0.01898 0.01754)
      PathPoint P4: thirdmc_l (0.00179 0.00828 0.00245)
      PathWrap: wrap_object=PL_l method=hybrid
      PathWrap pathwrap_0: wrap_object=Elbow_PT_ECRL_l method=hybrid
    Millard2012EquilibriumMuscle PT: max_isometric_force=557.2 optimal_fiber_length=0.0492 tendon_slack_length=0.098
        pennation_angle_at_optimal=0.1745329
      PathPoint P1: humerus_l (0.0036 -0.2759 0.0365)
      PathPoint P2: ulna_l (0.00846 -0.03373 0.01432)
      MovingPathPoint P3: ulna_l socket_x_coordinate=/jointset/radioulnar_l/pro_sup_l
          socket_y_coordinate=/jointset/radioulnar_l/pro_sup_l socket_z_coordinate=/jointset/radioulnar_l/pro_sup_l
        x_location: PiecewiseLinearFunction: x=(-1.5708 1.5708) y=(0.01884 0.00554)
        y_location: SimmSpline: x=(-1.5708 1.5708) y=(-0.06086 -0.06946)
        z_location: SimmSpline: x=(-1.5708 1.5708) y=(-0.00506 0.00944)
      ConditionalPathPoint P4: radius_l (0.0236 -0.0934 -0.0094) socket_coordinate=/jointset/radioulnar_l/pro_sup_l
          range=(-1.5708 0.509636)
      PathPoint P5: radius_l (0.0254 -0.1088 -0.0198)
      PathWrap: wrap_object=Elbow_PT_ECRL_l method=hybrid
    Millard2012EquilibriumMuscle PQ: max_isometric_force=284.7 optimal_fiber_length=0.0282 tendon_slack_length=0.005
        pennation_angle_at_optimal=0.1745329
      PathPoint P1: radius_l (0.03245 -0.19998 -0.01962)
      PathPoint P2: ulna_l (0.00193 -0.20972 -0.03632)
      PathWrap: wrap_object=PQ2_l method=hybrid
      PathWrap pathwrap_0: wrap_object=PQ1_l method=hybrid
  MarkerSet:
    Marker shoulder: humerus_l (0.005 -0.01 -0.02)
    Marker elbow: ulna_l (-0.01 0 -0.03)
    Marker wrist: lunate_l (0 0.01 -0.01)
    Marker shoulder_r: humerus (0.005 -0.01 0.02)
    Marker elbow_r: ulna (-0.01 0 0.03)
    Marker wrist_r: lunate (0 0.01 0.01)
