# OpenSim document version 20302
ForceSet arm26:
  CoordinateActuator shoulder_elev_reserve: coordinate=shoulder_elev optimal_force=1
  CoordinateActuator elv_angle_reserve: coordinate=elv_angle optimal_force=1
  CoordinateActuator shoulder_rot_reserve: coordinate=shoulder_rot optimal_force=1
  CoordinateActuator elbow_flexion_reserve: coordinate=elbow_flexion optimal_force=1
